/* JOINTSANDDRIVERS.ANY
Drivers based on the BergmannGH model:

- The pelvis is locked to the ground
- The abduction of the arm is driven according to Bergmann's experimental protocol
- The remaining degrees of freedom are controlled by parameters mannequin.any

Author:     Lauranne Sins
Instituion: Laboratoire de recherche en Imagerie et Orthopedie (LIO, Montreal (QC), Canada)
Version:    1.0
Date:       09/2015
*/

AnyFolder Drivers = {

  // Aliases for convenient referencing
  AnyFolder &JntPos=...HumanModel.Mannequin.Posture;
  AnyFolder &JntVel=...HumanModel.Mannequin.PostureVel;

  AnyFolder &Thorax = ..HumanModel.Trunk.SegmentsThorax.ThoraxSeg;
  AnyFolder &ref=Main.Model.HumanModel.Trunk;


  // ************************************
  // Drivers for attaching the pelvis to the global reference system
  // ************************************

  AnyKinEqSimpleDriver PelvisGroundDriver ={
    AnyKinLinear lin ={
      AnyFixedRefFrame &ref1 =....EnvironmentModel.GlobalRef;
      AnySeg &ref2 =....HumanModel.Trunk.SegmentsLumbar.PelvisSeg;
    };
    AnyKinRotational rot ={
      AnyFixedRefFrame &ref1 =....EnvironmentModel.GlobalRef;
      AnySeg &ref2 =....HumanModel.Trunk.SegmentsLumbar.PelvisSeg;
      Type=RotAxesAngles;
    };
    DriverPos={
      .JntPos.PelvisPosX,
      .JntPos.PelvisPosY,
      .JntPos.PelvisPosZ,
      pi/180*.JntPos.PelvisRotZ,
      pi/180*.JntPos.PelvisRotY,
      pi/180*.JntPos.PelvisRotX
    };
    DriverVel={
      .JntVel.PelvisPosX,
      .JntVel.PelvisPosY,
      .JntVel.PelvisPosZ,
      pi/180*.JntVel.PelvisRotX,
      pi/180*.JntVel.PelvisRotY,
      pi/180*.JntVel.PelvisRotZ
    };
    Reaction.Type={On,On,On,On,On,On};
  };


  // ************************************
  // Drivers for the spine
  // ************************************

  //Neck driver
  AnyKinEqSimpleDriver NeckJntDriver = {
    AnyRevoluteJoint &T12L1Joint = ...HumanModel.Interface.Trunk.NeckJoint;
    DriverPos = pi/180*{.JntPos.NeckExtension};
    DriverVel = pi/180*{.JntVel.NeckExtension};
    Reaction.Type = {Off};
  };

  //Thorax pelvis rotation driver
  AnyKinEqSimpleDriver PostureDriver ={
    AnyKinMeasureOrg &Ref2 = ...HumanModel.Interface.Trunk.PelvisThoraxLateralBending;
    AnyKinMeasureOrg &Ref3 = ...HumanModel.Interface.Trunk.PelvisThoraxRotation;
    AnyKinMeasureOrg &Ref1 = ...HumanModel.Interface.Trunk.PelvisThoraxExtension;

    DriverPos = pi/180*{
      .JntPos.PelvisThoraxLateralBending,
      .JntPos.PelvisThoraxRotation,
      .JntPos.PelvisThoraxExtension
    };
    DriverVel = pi/180*{
      .JntVel.PelvisThoraxLateralBending,
      .JntVel.PelvisThoraxRotation,
      .JntVel.PelvisThoraxExtension
    };
    Reaction.Type = {Off,Off,Off};
  };

  // ************************************
  // Drivers for the right arm
  // ************************************

  // -----------------------
  // Drivers for the Sterno clavicular joint
  // -----------------------
  #if BM_ARM_SHOULDER_RHYTHM_RIGHT == 0
  AnyKinEqSimpleDriver SCDriverRight ={
    AnyKinMeasureOrg &ref1 =...HumanModel.Interface.Right.SternoClavicularProtraction;
    AnyKinMeasureOrg &ref2 =...HumanModel.Interface.Right.SternoClavicularElevation;
    AnyKinMeasureOrg &ref3 =...HumanModel.Interface.Right.SternoClavicularAxialRotation;
    DriverPos = pi/180*{
      .JntPos.Right.SternoClavicularProtraction,
      .JntPos.Right.SternoClavicularElevation,
      .JntPos.Right.SternoClavicularAxialRotation
    };
    DriverVel = {
      .JntVel.Right.SternoClavicularProtraction,
      .JntVel.Right.SternoClavicularElevation,
      .JntVel.Right.SternoClavicularAxialRotation
    };
    Reaction.Type={Off,Off,Off};
  };
  #endif

  // -----------------------
  // Drivers for GH
  // -----------------------
  AnyKinEqSimpleDriver GHDriverRight={
    //    AnyKinMeasureOrg &ref1 =...HumanModel.Interface.Right.GlenohumeralAbduction;
    //      AnyKinMeasureOrg &ref2 =...HumanModel.Interface.Right.GlenohumeralFlexion;
    AnyKinMeasureOrg &ref3 =...HumanModel.Interface.Right.GlenohumeralExternalRotation;

    DriverPos=pi/180*{
      //      .JntPos.Right.GlenohumeralAbduction,  //GH joint
      //      .JntPos.Right.GlenohumeralFlexion,  //GH joint
      .JntPos.Right.GlenohumeralExternalRotation  //GH joint
    };
    DriverVel = pi/180*{
      //      .JntVel.Right.GlenohumeralAbduction,  //GH joint
      //      .JntVel.Right.GlenohumeralFlexion,  //GH joint
      .JntVel.Right.GlenohumeralExternalRotation  //GH joint
    };
    Reaction.Type={Off};
  };


  // Abduction movement. Modified compared to the Bergmann Model to introduce slower beginning and ending
  AnyVar startangle = 15;
  AnyVar endangle = 120;
    AnyKinEqFourierDriver AbductionDriverRight={
    AnyKinMeasureOrg &ref1 =...HumanModel.Interface.Right.GlenohumeralAbduction;
    Type = Sin;

    AnyVar w = pi/Main.Study.tEnd;
    Freq = w/(2*pi) ;
    A = { {(.startangle+.endangle)/2, (.endangle-.startangle)/2}*pi/180 };
    B = { {pi/2, -pi/2} };
    Reaction.Type = {Off};
  };

  // Keep the hand in the frontal plane
  AnyKinEq HandConstraint = {
    AnyKinLinear lin = {
      AnyRefFrame &GHnode = Main.Model.HumanModel.Right.ShoulderArm.Seg.Scapula.gh;
      AnyRefFrame &Hand = Main.Model.HumanModel.Right.ShoulderArm.Seg.Hand;
      Ref = 0;
    };
    Reaction.Type = {Off};
    MeasureOrganizer = {2};
  };

  //Elbow flexion driver
  AnyKinEqSimpleDriver ElbowFlexionDriverRight={
    AnyKinMeasureOrg  &Elbow =...HumanModel.Interface.Right.ElbowFlexion;
    DriverPos=pi/180*{.JntPos.Right.ElbowFlexion};
    DriverVel = pi/180*{.JntVel.Right.ElbowFlexion};
    Reaction.Type={Off};
  };

  //Elbow pronation driver
  AnyKinEqSimpleDriver ElbowPronationDriverRight={
    AnyKinMeasureOrg &Elbow =...HumanModel.Interface.Right.ElbowPronation;
    DriverPos = pi/180*{.JntPos.Right.ElbowPronation };

    DriverVel=pi/180*{.JntVel.Right.ElbowPronation };
    Reaction.Type={Off};
  };

  //Wrist driver
  AnyKinEqSimpleDriver WristDriverRight ={
    AnyKinMeasureOrg &ref1 =...HumanModel.Interface.Right.WristFlexion;
    AnyKinMeasureOrg &ref2 =...HumanModel.Interface.Right.WristAbduction;
    DriverPos = pi/180*{
      .JntPos.Right.WristFlexion,
      .JntPos.Right.WristAbduction
    };

    DriverVel = pi/180*{
      .JntVel.Right.WristFlexion,
      .JntVel.Right.WristAbduction};
    Reaction.Type={Off,Off};
  };

}; // Drivers
