/* MESURES_PATIENTNAME.ANY
Parameters for a specific patient.
Used with the option : scale 1 - anthropometric scaling.
NB: this file is a template:
  - It should not be modified
  - should be duplicated and new file should be saved with the real name of your patient/subject

Author:     Lauranne Sins
Instituion: Laboratoire de recherche en Imagerie et Orthopedie (LIO, Montreal (QC), Canada)
Version:    1.0
Date:       09/2015
*/

AnyFolder AnthroData = {
  // To be changed
  AnyVar Body_Mass = 75 ;
  AnyVar body_height = 180 /100;

  // NOT To be changed
  //Segment masses in kg from Winter ("Biomechanics and motor control of human movement." David A. Winter)
  AnyVar lumbar = 0.139*Body_Mass; // T12-L1 to L5-Sacrum
  AnyVar thorax = 0.1894*Body_Mass; // C7-T1 to T12-L1 (modified from 0.216 winter to separate scapula)
  AnyVar pelvis = 0.142*Body_Mass;
  AnyVar clavicle_r = 0.0133*Body_Mass;
  AnyVar upper_arm_r = 0.028*Body_Mass;
  AnyVar lower_arm_r = 0.016*Body_Mass;
  AnyVar hand_r = 0.006*Body_Mass;
  AnyVar clavicle_l = 0.0133*Body_Mass;
  AnyVar upper_arm_l = 0.028*Body_Mass;
  AnyVar lower_arm_l = 0.016*Body_Mass;
  AnyVar hand_l = 0.006*Body_Mass;
  AnyVar head = 0.081*Body_Mass; // head and cervical

};

// To be changed
AnyFolder AnthroSegmentLengths = {
  AnyVar PelvisWidth = 0.314;     // between external bony tip of trochanter (horizontaly)
  AnyVar HeadHeight = 0.246;      // from chin to top of head (verticaly)
  AnyVar TrunkHeight = 0.500;     // From C7 to sacrum midle bony tip (verticaly)
  AnyVar UpperArmLength = 0.414;  // From elbow bony tip to acromion bony tip along humerus (elbow flexed 90 deg)
  AnyVar LowerArmLength = 0.268;  // From elbow bony tip to ulna styloid bony tip along ulna (elbow flexed 90 deg)
  AnyVar HandLength = 0.182;      // From the base of the palm to the tip of the middle finger.
  AnyVar HandBreadth = 0.072;      // From the external landmark of the CMP joint of the index to the external landmark of the CMP joint of the little finger
};
