//VU study
//http://www.fbw.vu.nl/research/Lijn_A4/shoulder/overview.htm

//Note: PCSA has been divided according to no. of muscle elements

// Yamaguchi
//A survey of human musculotendon actuator parameters
//G.T. Yamaguchi, A.G. Sawa, D.W. Moran, M.J. Fessler, and J.M. Winters
// multiple Muscle Systems: Biomechanics and Movement Organization
//J.M. Winters and S.L.-T. Woo (eds.) 1990 Springer- verlag, New York

//Juul-Kristensen2000
// muscle sizes and moment arms of the rotator cuff muscles determined by magnetic resonance imaging
//B. Juul-kristensen, F. Bojsen-Moeller, L. Finsen, J. Eriksson, G. Johansson, F. Staahlberg, C. Ekdahl
//Cell Tissues Organs 2000, 214-222

//Kamibayashi1998
// morphometry of human neck muscles
//Lynne K. Kamibayashi, Frances J.R. Richmond
//Spine Vol. 23,No.12, pp. 1314-1323, 1998

//Holzbauer2005
//Kathrine Holzbaur, Wendy Murray, Scott Delp
//A model of the upper extremity for simulating musculoskeletal surgery and analysing neuromuscular control
//Annals of biomedical engineering, Vol. 33, no. 6, june 2005 pp.829-840

//Bodgduk1998
//The morphology and biomechanics of latissimus dorsi
//N. Bogduk, G.Johnson, D. Spalding
//Clinical Biomechanics 13(1998) 377-385

//Jacobson
//Jacobson, M. D., R. Raab, B. M. Fazeli, R. A. Abrams, M. J. Botte, and R. L. Lieber.
//Architectural design of the human intrinsic hand muscles.
// J. Hand Surg. [Am.] 17:804809, 1992.

//Lieber1
//Lieber, R. L., M. D. Jacobson, B. M. Fazeli, R. A. Abrams, and M. J. Botte.
//Architecture of selected muscles of the arm and forearm: Anatomy and implications for tendon transfer.
//J. Hand Surg. [Am.] 17:787-798, 1992.

//Lieber2
//Lieber, R. L., B. M. Fazeli, and M. J. Botte.
//Architecture of selected wrist flexor and extensor muscles.
//J. Hand Surg. [Am.] 15:244-250, 1990.

//Murray
//Muray, W.M.,T.S. Buchanan, and S.L. Delp.
//Scaling of peak moment arms with the elbow and forearm position
//J. Biomech. Vol. 28, pp. 513-525, 1995


AnyVar StrengthScaleHumerus = ....Scaling.StrengthScaling.Humerus.StrengthScale;
AnyVar StrengthScaleUlna = ....Scaling.StrengthScaling.Ulna.StrengthScale;
AnyFolder &ScaleStrength = Main.InputVariables.SettingValues.ScaleStrengthMuscle;

  #if (ANYBODY_V1 < 8) | (ANYBODY_V1 == 8 & ANYBODY_V2 < 0) | (ANYBODY_V1 == 8 & ANYBODY_V2 == 0 & ANYBODY_V4 < 11890 )
    #define __Lf_PARAM_ID Lfbar
    #define __Gamma_PARAM_ID Gammabar
    #define __Epsilon_PARAM_ID Epsilonbar
  #else
    #define __Lf_PARAM_ID Lf0
    #define __Gamma_PARAM_ID Gamma0
    #define __Epsilon_PARAM_ID Epsilon0
  #endif


AnyMuscleModel3E biceps_brachii_caput_breve = {
  AnyVar PCSA = 172.000000; // mm^2 VU study
  F0 = .StrengthScaleHumerus*PCSA*.ConstParam.MusStress;
  __Lf_PARAM_ID =0.1500000; // Yamaguchi
  Lt0 = 0.1; // Estimated
  __Gamma_PARAM_ID = (pi/180)* 2.000000; // Estimated
  __Epsilon_PARAM_ID = EpsilonbarTemp;
  K1 = K1Temp;
  K2 = K2Temp;
  Fcfast = FcfastTemp;
  Jt = JtTemp;
  Jpe = JpeTemp;
  PEFactor = PEFactorTemp;
};

AnyMuscleModel3E biceps_brachii_caput_longum = {
  AnyVar PCSA = 178.000000; // mm^2 VU study
  F0 = .StrengthScaleHumerus*PCSA*.ConstParam.MusStress;
  __Lf_PARAM_ID = 0.10000; // Yamaguchi
  Lt0 = 0.1; // Estimated
  __Gamma_PARAM_ID = (pi/180)* 2.000000; // Estimated
  __Epsilon_PARAM_ID = EpsilonbarTemp;
  K1 = K1Temp;
  K2 = K2Temp;
  Fcfast = FcfastTemp;
  Jt = JtTemp;
  Jpe = JpeTemp;
  PEFactor = PEFactorTemp;
};

AnyMuscleModel3E coracobrachialis_1 = {
  AnyVar Volume = 0.5*46.500000/10^6; // m^3 mayo k2_2
  AnyVar MuscleBellyLength = 0.250; // m mayo k2_2
  AnyVar PCSA = Volume/(MuscleBellyLength*cos(Gammabar));
  F0 = .StrengthScaleHumerus*PCSA*.ConstParam.MusStressForearm;
  AnyVar LfbarTemp = 0.091000; // m, mayo k2_2
  __Lf_PARAM_ID =LfbarTemp;
  Lt0 = 0.2*LfbarTemp; // Estimated
  __Gamma_PARAM_ID = (pi/180)* 1.000000; // Estimated
  __Epsilon_PARAM_ID = EpsilonbarTemp;
  K1 = K1Temp;
  K2 = K2Temp;
  Fcfast = FcfastTemp;
  Jt = JtTemp;
  Jpe = JpeTemp;
  PEFactor = PEFactorTemp;
};

AnyMuscleModel3E coracobrachialis_2 = {
  AnyVar Volume = 0.5*46.500000/10^6; // m^3 mayo k2_2
  AnyVar MuscleBellyLength = 0.250; // m mayo k2_2
  AnyVar PCSA = Volume/(MuscleBellyLength*cos(Gammabar));
  F0 = .StrengthScaleHumerus*PCSA*.ConstParam.MusStressForearm;
  AnyVar LfbarTemp = 0.091000; // m, mayo k2_2
  __Lf_PARAM_ID =LfbarTemp;
  Lt0 = 0.2*LfbarTemp; // Estimated
  __Gamma_PARAM_ID = (pi/180)* 1.000000; // Estimated
  __Epsilon_PARAM_ID = EpsilonbarTemp;
  K1 = K1Temp;
  K2 = K2Temp;
  Fcfast = FcfastTemp;
  Jt = JtTemp;
  Jpe = JpeTemp;
  PEFactor = PEFactorTemp;
};

AnyMuscleModel3E coracobrachialis_3 = {
  AnyVar Volume = 0.5*46.500000/10^6; // m^3 mayo k2_2
  AnyVar MuscleBellyLength = 0.250; // m mayo k2_2
  AnyVar PCSA = Volume/(MuscleBellyLength*cos(Gammabar));
  F0 = .StrengthScaleHumerus*PCSA*.ConstParam.MusStressForearm;
  AnyVar LfbarTemp = 0.091000; // m, mayo k2_2
  __Lf_PARAM_ID =LfbarTemp;
  Lt0 = 0.2*LfbarTemp; // Estimated
  __Gamma_PARAM_ID = (pi/180)* 1.000000; // Estimated
  __Epsilon_PARAM_ID = EpsilonbarTemp;
  K1 = K1Temp;
  K2 = K2Temp;
  Fcfast = FcfastTemp;
  Jt = JtTemp;
  Jpe = JpeTemp;
  PEFactor = PEFactorTemp;
};

AnyMuscleModel3E coracobrachialis_4 = {
  AnyVar Volume = 0.5*46.500000/10^6; // m^3 mayo k2_2
  AnyVar MuscleBellyLength = 0.250; // m mayo k2_2
  AnyVar PCSA = Volume/(MuscleBellyLength*cos(Gammabar));
  F0 = .StrengthScaleHumerus*PCSA*.ConstParam.MusStressForearm;
  AnyVar LfbarTemp = 0.091000; // m, mayo k2_2
  __Lf_PARAM_ID =LfbarTemp;
  Lt0 = 0.2*LfbarTemp; // Estimated
  __Gamma_PARAM_ID = (pi/180)* 1.000000; // Estimated
  __Epsilon_PARAM_ID = EpsilonbarTemp;
  K1 = K1Temp;
  K2 = K2Temp;
  Fcfast = FcfastTemp;
  Jt = JtTemp;
  Jpe = JpeTemp;
  PEFactor = PEFactorTemp;
};

AnyMuscleModel3E coracobrachialis_5 = {
  AnyVar Volume = 0.5*46.500000/10^6; // m^3 mayo k2_2
  AnyVar MuscleBellyLength = 0.250; // m mayo k2_2
  AnyVar PCSA = Volume/(MuscleBellyLength*cos(Gammabar));
  F0 = .StrengthScaleHumerus*PCSA*.ConstParam.MusStressForearm;
  AnyVar LfbarTemp = 0.091000; // m, mayo k2_2
  __Lf_PARAM_ID =LfbarTemp;
  Lt0 = 0.2*LfbarTemp; // Estimated
  __Gamma_PARAM_ID = (pi/180)* 1.000000; // Estimated
  __Epsilon_PARAM_ID = EpsilonbarTemp;
  K1 = K1Temp;
  K2 = K2Temp;
  Fcfast = FcfastTemp;
  Jt = JtTemp;
  Jpe = JpeTemp;
  PEFactor = PEFactorTemp;
};

AnyMuscleModel3E coracobrachialis_6 = {
  AnyVar Volume = 0.5*46.500000/10^6; // m^3 mayo k2_2
  AnyVar MuscleBellyLength = 0.250; // m mayo k2_2
  AnyVar PCSA = Volume/(MuscleBellyLength*cos(Gammabar));
  F0 = .StrengthScaleHumerus*PCSA*.ConstParam.MusStressForearm;
  AnyVar LfbarTemp = 0.091000; // m, mayo k2_2
  __Lf_PARAM_ID =LfbarTemp;
  Lt0 = 0.2*LfbarTemp; // Estimated
  __Gamma_PARAM_ID = (pi/180)* 1.000000; // Estimated
  __Epsilon_PARAM_ID = EpsilonbarTemp;
  K1 = K1Temp;
  K2 = K2Temp;
  Fcfast = FcfastTemp;
  Jt = JtTemp;
  Jpe = JpeTemp;
  PEFactor = PEFactorTemp;
};

AnyMuscleModel3E deltoideus_scapular_part_1 = {
  AnyVar PCSA = 90.000000; // mm^2 Holzbauer et. al
//  F0 = .StrengthScaleHumerus*PCSA*.ConstParam.MusStress;
  F0 = .StrengthScaleHumerus*PCSA*.ConstParam.MusStress*.ScaleStrength.S_DeltoidPost;
  __Lf_PARAM_ID = 0.165*0.7; // Estimated using length Yamaguchi [16]
  Lt0 = 0.15*0.165; // Estimated using length Yamaguchi [16]
  __Gamma_PARAM_ID = (pi/180)* 0.000000; // Estimated
  __Epsilon_PARAM_ID = EpsilonbarTemp;
  K1 = K1Temp;
  K2 = K2Temp;
  Fcfast = FcfastTemp;
  Jt = JtTemp;
  Jpe = JpeTemp;
  PEFactor = PEFactorTemp;
};

AnyMuscleModel3E deltoideus_scapular_part_2 = {
  AnyVar PCSA = 90.000000; // mm^2 Holzbauer et. al
//  F0 = .StrengthScaleHumerus*PCSA*.ConstParam.MusStress;
  F0 = .StrengthScaleHumerus*PCSA*.ConstParam.MusStress*.ScaleStrength.S_DeltoidPost;
  __Lf_PARAM_ID = 0.165*0.7; // Estimated using length Yamaguchi [16]
  Lt0 = 0.15*0.165; // Estimated using length Yamaguchi [16]
  __Gamma_PARAM_ID = (pi/180)* 0.000000; // Estimated
  __Epsilon_PARAM_ID = EpsilonbarTemp;
  K1 = K1Temp;
  K2 = K2Temp;
  Fcfast = FcfastTemp;
  Jt = JtTemp;
  Jpe = JpeTemp;
  PEFactor = PEFactorTemp;
};

AnyMuscleModel3E deltoideus_scapular_part_3 = {
  AnyVar PCSA = 205.000000; // mm^2 Holzbauer et. al

//  F0 = .StrengthScaleHumerus*PCSA*.ConstParam.MusStress;
  F0 = .StrengthScaleHumerus*PCSA*.ConstParam.MusStress*.ScaleStrength.S_DeltoidMid;
  __Lf_PARAM_ID = 0.165*0.7; // Estimated using length Yamaguchi [16]
  Lt0 = 0.15*0.165; // Estimated using length Yamaguchi [16]
  __Gamma_PARAM_ID = (pi/180)* 0.000000; // Estimated
  __Epsilon_PARAM_ID = EpsilonbarTemp;
  K1 = K1Temp;
  K2 = K2Temp;
  Fcfast = FcfastTemp;
  Jt = JtTemp;
  Jpe = JpeTemp;
  PEFactor = PEFactorTemp;
};

AnyMuscleModel3E deltoideus_scapular_part_4 = {
  AnyVar PCSA = 205.000000; // mm^2 Holzbauer et. al
//  F0 = .StrengthScaleHumerus*PCSA*.ConstParam.MusStress;
  F0 = .StrengthScaleHumerus*PCSA*.ConstParam.MusStress*.ScaleStrength.S_DeltoidMid;
  __Lf_PARAM_ID = 0.165*0.8; // Estimated using length Yamaguchi [16]
  Lt0 = 0.15*0.165; // Estimated using length Yamaguchi [16]
  __Gamma_PARAM_ID = (pi/180)* 0.000000; // Estimated
  __Epsilon_PARAM_ID = EpsilonbarTemp;
  K1 = K1Temp;
  K2 = K2Temp;
  Fcfast = FcfastTemp;
  Jt = JtTemp;
  Jpe = JpeTemp;
  PEFactor = PEFactorTemp;
};

AnyMuscleModel3E deltoideus_scapular_part_5 = {
  AnyVar PCSA = 205.000000; // mm^2 VU study
//  F0 = .StrengthScaleHumerus*PCSA*.ConstParam.MusStress;
  F0 = .StrengthScaleHumerus*PCSA*.ConstParam.MusStress*.ScaleStrength.S_DeltoidMid;
  __Lf_PARAM_ID = 0.165*0.8; // Estimated using length Yamaguchi [16]
  Lt0 = 0.15*0.165; // Estimated using length Yamaguchi [16]
  __Gamma_PARAM_ID = (pi/180)* 0.000000; // Estimated
  __Epsilon_PARAM_ID = EpsilonbarTemp;
  K1 = K1Temp;
  K2 = K2Temp;
  Fcfast = FcfastTemp;
  Jt = JtTemp;
  Jpe = JpeTemp;
  PEFactor = PEFactorTemp;
};

AnyMuscleModel3E deltoideus_scapular_part_6 = {
  AnyVar PCSA = 205.000000; // mm^2 VU study
//  F0 = .StrengthScaleHumerus*PCSA*.ConstParam.MusStress;
  F0 = .StrengthScaleHumerus*PCSA*.ConstParam.MusStress*.ScaleStrength.S_DeltoidMid;
  __Lf_PARAM_ID = 0.165*0.8; // Estimated using length Yamaguchi [16]
  Lt0 = 0.15*0.165; // Estimated using length Yamaguchi [16]
  __Gamma_PARAM_ID = (pi/180)* 0.000000; // Estimated
  __Epsilon_PARAM_ID = EpsilonbarTemp;
  K1 = K1Temp;
  K2 = K2Temp;
  Fcfast = FcfastTemp;
  Jt = JtTemp;
  Jpe = JpeTemp;
  PEFactor = PEFactorTemp;
};

AnyMuscleModel3E deltoideus_clavicular_part_1 = {
  AnyVar PCSA = 136.0; // mm^2 HolzBauer et. al
//  F0 = .StrengthScaleHumerus*PCSA*.ConstParam.MusStress;
  F0 = .StrengthScaleHumerus*PCSA*.ConstParam.MusStress*.ScaleStrength.S_DeltoidMid;
  __Lf_PARAM_ID = 0.165*0.85; // Estimated using length Yamaguchi [16]
  Lt0 = 0.15*0.165; // Estimated using length Yamaguchi [16]
  __Gamma_PARAM_ID = (pi/180)* 0.000000; // Estimated
  __Epsilon_PARAM_ID = EpsilonbarTemp;
  K1 = K1Temp;
  K2 = K2Temp;
  Fcfast = FcfastTemp;
  Jt = JtTemp;
  Jpe = JpeTemp;
  PEFactor = PEFactorTemp;
};

AnyMuscleModel3E deltoideus_clavicular_part_2 = {
  AnyVar PCSA = 136.0; // mm^2 HolzBauer et. al
//  F0 = .StrengthScaleHumerus*PCSA*.ConstParam.MusStress;
  F0 = .StrengthScaleHumerus*PCSA*.ConstParam.MusStress*.ScaleStrength.S_DeltoidAnt;
  __Lf_PARAM_ID = 0.165*0.85; // Estimated using length Yamaguchi [16]
  Lt0 = 0.15*0.165; // Estimated using length Yamaguchi [16]
  __Gamma_PARAM_ID = (pi/180)* 0.000000; // Estimated
  __Epsilon_PARAM_ID = EpsilonbarTemp;
  K1 = K1Temp;
  K2 = K2Temp;
  Fcfast = FcfastTemp;
  Jt = JtTemp;
  Jpe = JpeTemp;
  PEFactor = PEFactorTemp;
};

AnyMuscleModel3E deltoideus_clavicular_part_3 = {
  AnyVar PCSA = 136.0; // mm^2 HolzBauer et. al
//  F0 = .StrengthScaleHumerus*PCSA*.ConstParam.MusStress;
  F0 = .StrengthScaleHumerus*PCSA*.ConstParam.MusStress*.ScaleStrength.S_DeltoidAnt;
  __Lf_PARAM_ID = 0.165*0.85; // Estimated using length Yamaguchi [16]
  Lt0 = 0.15*0.165; // Estimated using length Yamaguchi [16]
  __Gamma_PARAM_ID = (pi/180)* 0.000000; // Estimated
  __Epsilon_PARAM_ID = EpsilonbarTemp;
  K1 = K1Temp;
  K2 = K2Temp;
  Fcfast = FcfastTemp;
  Jt = JtTemp;
  Jpe = JpeTemp;
  PEFactor = PEFactorTemp;
};

AnyMuscleModel3E deltoideus_clavicular_part_4 = {
  AnyVar PCSA = 136.0; // mm^2 HolzBauer et. al
//  F0 = .StrengthScaleHumerus*PCSA*.ConstParam.MusStress;
  F0 = .StrengthScaleHumerus*PCSA*.ConstParam.MusStress*.ScaleStrength.S_DeltoidAnt;
  __Lf_PARAM_ID = 0.165*0.85; // Estimated using length Yamaguchi [16]
  Lt0 = 0.15*0.165; // Estimated using length Yamaguchi [16]
  __Gamma_PARAM_ID = (pi/180)* 0.000000; // Estimated
  __Epsilon_PARAM_ID = EpsilonbarTemp;
  K1 = K1Temp;
  K2 = K2Temp;
  Fcfast = FcfastTemp;
  Jt = JtTemp;
  Jpe = JpeTemp;
  PEFactor = PEFactorTemp;
};

AnyMuscleModel3E deltoideus_clavicular_part_5 = {
  AnyVar PCSA = 136.0; // mm^2 HolzBauer et. al
//  F0 = .StrengthScaleHumerus*PCSA*.ConstParam.MusStress;
  F0 = .StrengthScaleHumerus*PCSA*.ConstParam.MusStress*.ScaleStrength.S_DeltoidAnt;
  __Lf_PARAM_ID = 0.165*0.85; // Estimated using length Yamaguchi [16]
  Lt0 = 0.15*0.165; // Estimated using length Yamaguchi [16]
  __Gamma_PARAM_ID = (pi/180)* 0.000000; // Estimated
  __Epsilon_PARAM_ID = EpsilonbarTemp;
  K1 = K1Temp;
  K2 = K2Temp;
  Fcfast = FcfastTemp;
  Jt = JtTemp;
  Jpe = JpeTemp;
  PEFactor = PEFactorTemp;
};

AnyMuscleModel3E deltoideus_clavicular_part_6 = {
  AnyVar PCSA = 136.0; // mm^2 HolzBauer et. al
//  F0 = .StrengthScaleHumerus*PCSA*.ConstParam.MusStress;
  F0 = .StrengthScaleHumerus*PCSA*.ConstParam.MusStress*.ScaleStrength.S_DeltoidAnt;
  __Lf_PARAM_ID = 0.165*0.85; // Estimated using length Yamaguchi [16]
  Lt0 = 0.15*0.165; // Estimated using length Yamaguchi [16]
  __Gamma_PARAM_ID = (pi/180)* 0.000000; // Estimated
  __Epsilon_PARAM_ID = EpsilonbarTemp;
  K1 = K1Temp;
  K2 = K2Temp;
  Fcfast = FcfastTemp;
  Jt = JtTemp;
  Jpe = JpeTemp;
  PEFactor = PEFactorTemp;
};

AnyMuscleModel3E infraspinatus_1 = {
  AnyVar PCSA = 136.200000; // mm^2 VU study
  F0 = .StrengthScaleHumerus*PCSA*.ConstParam.MusStress;
  __Lf_PARAM_ID = 0.0650; // Juul-Kristensen2000
  Lt0 = 0.05*0.15; // Estimated using muscle length from Yamaguchi [16]
  __Gamma_PARAM_ID = (pi/180)* 0.000000; // Estimated
  __Epsilon_PARAM_ID = EpsilonbarTemp;
  K1 = K1Temp;
  K2 = K2Temp;
  Fcfast = FcfastTemp;
  Jt = JtTemp;
  Jpe = JpeTemp;
  PEFactor = PEFactorTemp;
};

AnyMuscleModel3E infraspinatus_2 = {
  AnyVar PCSA = 136.200000; // mm^2 VU study
  F0 = .StrengthScaleHumerus*PCSA*.ConstParam.MusStress;
  __Lf_PARAM_ID = 0.0650; // Juul-Kristensen2000
  Lt0 = 0.05*0.15; // Estimated using muscle length from Yamaguchi [16]
  __Gamma_PARAM_ID = (pi/180)* 0.000000; // Estimated
  __Epsilon_PARAM_ID = EpsilonbarTemp;
  K1 = K1Temp;
  K2 = K2Temp;
  Fcfast = FcfastTemp;
  Jt = JtTemp;
  Jpe = JpeTemp;
  PEFactor = PEFactorTemp;
};

AnyMuscleModel3E infraspinatus_3 = {
  AnyVar PCSA = 136.200000; // mm^2 VU study
  F0 = .StrengthScaleHumerus*PCSA*.ConstParam.MusStress;
  __Lf_PARAM_ID = 0.0650; // Juul-Kristensen2000
  Lt0 = 0.05*0.15; // Estimated using muscle length from Yamaguchi [16]
  __Gamma_PARAM_ID = (pi/180)* 0.000000; // Estimated
  __Epsilon_PARAM_ID = EpsilonbarTemp;
  K1 = K1Temp;
  K2 = K2Temp;
  Fcfast = FcfastTemp;
  Jt = JtTemp;
  Jpe = JpeTemp;
  PEFactor = PEFactorTemp;
};

AnyMuscleModel3E infraspinatus_4 = {
  AnyVar PCSA = 136.200000; // mm^2 VU study
  F0 = .StrengthScaleHumerus*PCSA*.ConstParam.MusStress;
  __Lf_PARAM_ID = 0.0650; // Juul-Kristensen2000
  Lt0 = 0.05*0.15; // Estimated using muscle length from Yamaguchi [16]
  __Gamma_PARAM_ID = (pi/180)* 0.000000; // Estimated
  __Epsilon_PARAM_ID = EpsilonbarTemp;
  K1 = K1Temp;
  K2 = K2Temp;
  Fcfast = FcfastTemp;
  Jt = JtTemp;
  Jpe = JpeTemp;
  PEFactor = PEFactorTemp;
};

AnyMuscleModel3E infraspinatus_5 = {
  AnyVar PCSA = 136.200000; // mm^2 VU study
  F0 = .StrengthScaleHumerus*PCSA*.ConstParam.MusStress;
  __Lf_PARAM_ID = 0.0650; // Juul-Kristensen2000
  Lt0 = 0.05*0.15; // Estimated using muscle length from Yamaguchi [16]
  __Gamma_PARAM_ID = (pi/180)* 0.000000; // Estimated
  __Epsilon_PARAM_ID = EpsilonbarTemp;
  K1 = K1Temp;
  K2 = K2Temp;
  Fcfast = FcfastTemp;
  Jt = JtTemp;
  Jpe = JpeTemp;
  PEFactor = PEFactorTemp;
};

AnyMuscleModel3E infraspinatus_6 = {
  AnyVar PCSA = 136.200000; // mm^2 VU study
  F0 = .StrengthScaleHumerus*PCSA*.ConstParam.MusStress;
  __Lf_PARAM_ID = 0.0650; // Juul-Kristensen2000
  Lt0 = 0.05*0.15; // Estimated using muscle length from Yamaguchi [16]
  __Gamma_PARAM_ID = (pi/180)* 0.000000; // Estimated
  __Epsilon_PARAM_ID = EpsilonbarTemp;
  K1 = K1Temp;
  K2 = K2Temp;
  Fcfast = FcfastTemp;
  Jt = JtTemp;
  Jpe = JpeTemp;
  PEFactor = PEFactorTemp;
};

//The psca ofthe latissimus fasciles has been distribued roughly in accordance with Bodguk1998
AnyMuscleModel3E latissimus_dorsi_1 = {
  AnyVar PCSA = 620.00000*0.07; // mm^2 Bogduk 1998
  F0 = .StrengthScaleHumerus*PCSA*.ConstParam.MusStress;
  AnyVar LfbarTemp = 0.140000; // Estimated value
  __Lf_PARAM_ID =LfbarTemp;
  Lt0 = 0.15*LfbarTemp; // Estimated value

  __Gamma_PARAM_ID = (pi/180)* 0.000000; // Estimated value
  __Epsilon_PARAM_ID = EpsilonbarTemp;
  K1 = K1Temp;
  K2 = K2Temp;
  Fcfast = FcfastTemp;
  Jt = JtTemp;
  Jpe = JpeTemp;
  PEFactor = PEFactorTemp;
};

AnyMuscleModel3E latissimus_dorsi_2 = {
  AnyVar PCSA = 620.00000*0.14; // mm^2 Bogduk 1998
  F0 = .StrengthScaleHumerus*PCSA*.ConstParam.MusStress;
  AnyVar LfbarTemp = 0.140000; // Estimated value
  __Lf_PARAM_ID =LfbarTemp;
  Lt0 = 0.15*LfbarTemp; // Estimated value

  __Gamma_PARAM_ID = (pi/180)* 0.000000; // Estimated value
  __Epsilon_PARAM_ID = EpsilonbarTemp;
  K1 = K1Temp;
  K2 = K2Temp;
  Fcfast = FcfastTemp;
  Jt = JtTemp;
  Jpe = JpeTemp;
  PEFactor = PEFactorTemp;
};

AnyMuscleModel3E latissimus_dorsi_3 = {
  AnyVar PCSA = 620.00000*0.18;// mm^2 Bogduk 1998
  F0 = .StrengthScaleHumerus*PCSA*.ConstParam.MusStress;
  AnyVar   LfbarTemp = 0.140000; // Estimated value
  __Lf_PARAM_ID =LfbarTemp;
  Lt0 = 0.15*LfbarTemp; // Estimated value
  __Gamma_PARAM_ID = (pi/180)* 0.000000; // Estimated value
  __Epsilon_PARAM_ID = EpsilonbarTemp;
  K1 = K1Temp;
  K2 = K2Temp;
  Fcfast = FcfastTemp;
  Jt = JtTemp;
  Jpe = JpeTemp;
  PEFactor = PEFactorTemp;
};

AnyMuscleModel3E latissimus_dorsi_4 = {
  AnyVar PCSA = 620.00000*0.22; // mm^2 Bogduk 1998
  F0 = .StrengthScaleHumerus*PCSA*.ConstParam.MusStress;
  __Lf_PARAM_ID =LfbarTemp;
  AnyVar LfbarTemp = 0.140000; // Estimated value
  Lt0 = 0.15*LfbarTemp; // Estimated value
  __Gamma_PARAM_ID = (pi/180)* 0.000000; // Estimated value
  __Epsilon_PARAM_ID = EpsilonbarTemp;
  K1 = K1Temp;
  K2 = K2Temp;
  Fcfast = FcfastTemp;
  Jt = JtTemp;
  Jpe = JpeTemp;
  PEFactor = PEFactorTemp;
};

AnyMuscleModel3E latissimus_dorsi_5 = {
  AnyVar PCSA = 620.00000*0.29; // mm^2 Bogduk 1998
  F0 = .StrengthScaleHumerus*PCSA*.ConstParam.MusStress;
  __Lf_PARAM_ID =LfbarTemp;
  AnyVar  LfbarTemp = 0.140000; // Estimated value
  Lt0 = 0.15*LfbarTemp; // Estimated value
  __Gamma_PARAM_ID = (pi/180)* 0.000000; // Estimated value
  __Epsilon_PARAM_ID = EpsilonbarTemp;
  K1 = K1Temp;
  K2 = K2Temp;
  Fcfast = FcfastTemp;
  Jt = JtTemp;
  Jpe = JpeTemp;
  PEFactor = PEFactorTemp;
};

AnyMuscleModel3E levator_scapulae_1 = {
  AnyVar PCSA = (3/4)*114.700000; // mm^2 VU study
  F0 = .StrengthScaleHumerus*PCSA*.ConstParam.MusStress;
  AnyVar LfbarTemp = 0.100000; //Kamibayashi1998
  __Lf_PARAM_ID =LfbarTemp;
  Lt0 = 0.2*LfbarTemp; // Estimated value
  __Gamma_PARAM_ID = (pi/180)* 5.000000; //Kamibayashi1998
  __Epsilon_PARAM_ID = EpsilonbarTemp;
  K1 = K1Temp;
  K2 = K2Temp;
  Fcfast = FcfastTemp;
  Jt = JtTemp;
  Jpe = JpeTemp;
  PEFactor = PEFactorTemp;
};

AnyMuscleModel3E levator_scapulae_2 = {
  AnyVar PCSA = (3/4)*114.700000; // mm^2 VU study
  F0 = .StrengthScaleHumerus*PCSA*.ConstParam.MusStress;
  AnyVar LfbarTemp = 0.100000; //Kamibayashi1998
  __Lf_PARAM_ID =LfbarTemp;
  Lt0 = 0.2*LfbarTemp; // Estimated value
  __Gamma_PARAM_ID = (pi/180)* 5.000000; //Kamibayashi1998
  __Epsilon_PARAM_ID = EpsilonbarTemp;
  K1 = K1Temp;
  K2 = K2Temp;
  Fcfast = FcfastTemp;
  Jt = JtTemp;
  Jpe = JpeTemp;
  PEFactor = PEFactorTemp;
};

AnyMuscleModel3E levator_scapulae_3 = {
  AnyVar PCSA = (3/4)*114.700000; // mm^2 VU study
  F0 = .StrengthScaleHumerus*PCSA*.ConstParam.MusStress;
  AnyVar LfbarTemp = 0.100000; //Kamibayashi1998
  __Lf_PARAM_ID =LfbarTemp;
  Lt0 = 0.2*LfbarTemp; // Estimated value
  __Gamma_PARAM_ID = (pi/180)* 5.000000; //Kamibayashi1998
  __Epsilon_PARAM_ID = EpsilonbarTemp;
  K1 = K1Temp;
  K2 = K2Temp;
  Fcfast = FcfastTemp;
  Jt = JtTemp;
  Jpe = JpeTemp;
  PEFactor = PEFactorTemp;
};

AnyMuscleModel3E levator_scapulae_4 = {
  AnyVar PCSA = (3/4)*114.700000; // mm^2 VU study
  F0 = .StrengthScaleHumerus*PCSA*.ConstParam.MusStress;
  AnyVar LfbarTemp = 0.100000; //Kamibayashi1998
  __Lf_PARAM_ID =LfbarTemp;
  Lt0 = 0.2*LfbarTemp; // Estimated value
  __Gamma_PARAM_ID = (pi/180)* 5.000000; //Kamibayashi1998
  __Epsilon_PARAM_ID = EpsilonbarTemp;
  K1 = K1Temp;
  K2 = K2Temp;
  Fcfast = FcfastTemp;
  Jt = JtTemp;
  Jpe = JpeTemp;
  PEFactor = PEFactorTemp;
};

AnyMuscleModel3E pectoralis_major_thoracic_part_1 = {
  AnyVar PCSA = 130.00000; // mm^2 Holzbaur2005
  F0 = .StrengthScaleHumerus*PCSA*.ConstParam.MusStress;
  AnyVar LfbarTemp = 0.120000; // Estimated value
  __Lf_PARAM_ID =LfbarTemp;
  Lt0 = 0.1*LfbarTemp; // Estimated value
  __Gamma_PARAM_ID = (pi/180)* 5.000000; // Estimated
  __Epsilon_PARAM_ID = EpsilonbarTemp;
  K1 = K1Temp;
  K2 = K2Temp;
  Fcfast = FcfastTemp;
  Jt = JtTemp;
  Jpe = JpeTemp;
  PEFactor = PEFactorTemp;
};

AnyMuscleModel3E pectoralis_major_thoracic_part_2 = {
  AnyVar PCSA = 130.00000; // mm^2 Holzbaur2005
  F0 = .StrengthScaleHumerus*PCSA*.ConstParam.MusStress;
  AnyVar LfbarTemp = 0.120000; // Estimated value
  Lt0 = 0.1*LfbarTemp; // Estimated value
  __Lf_PARAM_ID =LfbarTemp;
  __Gamma_PARAM_ID = (pi/180)* 5.000000; // Estimated
  __Epsilon_PARAM_ID = EpsilonbarTemp;
  K1 = K1Temp;
  K2 = K2Temp;
  Fcfast = FcfastTemp;
  Jt = JtTemp;
  Jpe = JpeTemp;
  PEFactor = PEFactorTemp;
};

AnyMuscleModel3E pectoralis_major_thoracic_part_3 = {
  AnyVar PCSA = 130.00000; // mm^2 Holzbaur2005
  F0 = .StrengthScaleHumerus*PCSA*.ConstParam.MusStress;
  AnyVar LfbarTemp = 0.120000; // Estimated value
  __Lf_PARAM_ID =LfbarTemp;
  Lt0 = 0.1*LfbarTemp; // Estimated value
  __Gamma_PARAM_ID = (pi/180)* 5.000000; // Estimated
  __Epsilon_PARAM_ID = EpsilonbarTemp;
  K1 = K1Temp;
  K2 = K2Temp;
  Fcfast = FcfastTemp;
  Jt = JtTemp;
  Jpe = JpeTemp;
  PEFactor = PEFactorTemp;
};

AnyMuscleModel3E pectoralis_major_thoracic_part_4 = {
  AnyVar PCSA = 130.00000; // mm^2 Holzbaur2005
  F0 = .StrengthScaleHumerus*PCSA*.ConstParam.MusStress;
  AnyVar LfbarTemp = 0.120000; // Estimated value
  __Lf_PARAM_ID =LfbarTemp;
  Lt0 = 0.1*LfbarTemp; // Estimated value
  __Gamma_PARAM_ID = (pi/180)* 5.000000; // Estimated
  __Epsilon_PARAM_ID = EpsilonbarTemp;
  K1 = K1Temp;
  K2 = K2Temp;
  Fcfast = FcfastTemp;
  Jt = JtTemp;
  Jpe = JpeTemp;
  PEFactor = PEFactorTemp;
};

AnyMuscleModel3E pectoralis_major_thoracic_part_5 = {
  AnyVar PCSA = 130.00000; // mm^2 Holzbaur2005
  F0 = .StrengthScaleHumerus*PCSA*.ConstParam.MusStress;
  AnyVar LfbarTemp = 0.120000; // Estimated value
  __Lf_PARAM_ID =LfbarTemp;
  Lt0 = 0.1*LfbarTemp; // Estimated value
  __Gamma_PARAM_ID = (pi/180)* 5.000000; // Estimated
  __Epsilon_PARAM_ID = EpsilonbarTemp;
  K1 = K1Temp;
  K2 = K2Temp;
  Fcfast = FcfastTemp;
  Jt = JtTemp;
  Jpe = JpeTemp;
  PEFactor = PEFactorTemp;
};

AnyMuscleModel3E pectoralis_major_clavicular_part_1 = {
  AnyVar PCSA = 52.00000; // mm^2 Holzbaur2005
  F0 = .StrengthScaleHumerus*PCSA*.ConstParam.MusStress;
  AnyVar LfbarTemp = 0.120000; // Estimated value
  __Lf_PARAM_ID =LfbarTemp;
  Lt0 = 0.1*LfbarTemp; // Estimated value
  __Gamma_PARAM_ID = (pi/180)* 5.000000; // Estimated
  __Epsilon_PARAM_ID = EpsilonbarTemp;
  K1 = K1Temp;
  K2 = K2Temp;
  Fcfast = FcfastTemp;
  Jt = JtTemp;
  Jpe = JpeTemp;
  PEFactor = PEFactorTemp;
};

AnyMuscleModel3E pectoralis_major_clavicular_part_2 = {
  AnyVar PCSA = 52.00000; // mm^2 Holzbaur2005

  F0 = .StrengthScaleHumerus*PCSA*.ConstParam.MusStress;
  AnyVar LfbarTemp = 0.120000; // Estimated value
  __Lf_PARAM_ID =LfbarTemp;
  Lt0 = 0.1*LfbarTemp; // Estimated value
  __Gamma_PARAM_ID = (pi/180)* 5.000000; // Estimated
  __Epsilon_PARAM_ID = EpsilonbarTemp;
  K1 = K1Temp;
  K2 = K2Temp;
  Fcfast = FcfastTemp;
  Jt = JtTemp;
  Jpe = JpeTemp;
  PEFactor = PEFactorTemp;
};

AnyMuscleModel3E pectoralis_major_clavicular_part_3 = {
  AnyVar PCSA = 52.00000; // mm^2 Holzbaur2005
  F0 = .StrengthScaleHumerus*PCSA*.ConstParam.MusStress;
  AnyVar LfbarTemp = 0.120000; // Estimated value
  Lt0 = 0.1*LfbarTemp; // Estimated value
  __Lf_PARAM_ID =LfbarTemp;
  __Gamma_PARAM_ID = (pi/180)* 5.000000; // Estimated
  __Epsilon_PARAM_ID = EpsilonbarTemp;
  K1 = K1Temp;
  K2 = K2Temp;
  Fcfast = FcfastTemp;
  Jt = JtTemp;
  Jpe = JpeTemp;
  PEFactor = PEFactorTemp;
};

AnyMuscleModel3E pectoralis_major_clavicular_part_4 = {
  AnyVar PCSA = 52.00000; // mm^2 Holzbaur2005
  F0 = .StrengthScaleHumerus*PCSA*.ConstParam.MusStress;
  AnyVar LfbarTemp = 0.120000; // Estimated value
  Lt0 = 0.1*LfbarTemp; // Estimated value
  __Lf_PARAM_ID =LfbarTemp;
  __Gamma_PARAM_ID = (pi/180)* 5.000000; // Estimated
  __Epsilon_PARAM_ID = EpsilonbarTemp;
  K1 = K1Temp;
  K2 = K2Temp;
  Fcfast = FcfastTemp;
  Jt = JtTemp;
  Jpe = JpeTemp;
  PEFactor = PEFactorTemp;
};

AnyMuscleModel3E pectoralis_major_clavicular_part_5 = {
  AnyVar PCSA = 52.00000; // mm^2 Holzbaur2005
  F0 = .StrengthScaleHumerus*PCSA*.ConstParam.MusStress;
  AnyVar LfbarTemp = 0.120000; // Estimated value
  Lt0 = 0.1*LfbarTemp; // Estimated value
  __Lf_PARAM_ID =LfbarTemp;
  __Gamma_PARAM_ID = (pi/180)* 5.000000; // Estimated
  __Epsilon_PARAM_ID = EpsilonbarTemp;
  K1 = K1Temp;
  K2 = K2Temp;
  Fcfast = FcfastTemp;
  Jt = JtTemp;
  Jpe = JpeTemp;
  PEFactor = PEFactorTemp;
};

AnyMuscleModel3E pectoralis_minor_1 = {
  AnyVar PCSA = 85.700000; // mm^2 VU study
  F0 = .StrengthScaleHumerus*PCSA*.ConstParam.MusStress;
  AnyVar LfbarTemp = 0.080000; // Estimated value
  __Lf_PARAM_ID =LfbarTemp;
  Lt0 = 0.1*LfbarTemp; // Estimated value
  __Gamma_PARAM_ID = (pi/180)* 5.000000; // Estimated
  __Epsilon_PARAM_ID = EpsilonbarTemp;
  K1 = K1Temp;
  K2 = K2Temp;
  Fcfast = FcfastTemp;
  Jt = JtTemp;
  Jpe = JpeTemp;
  PEFactor = PEFactorTemp;
};

AnyMuscleModel3E pectoralis_minor_2 = {
  AnyVar PCSA = 85.700000; // mm^2 VU study
  F0 = .StrengthScaleHumerus*PCSA*.ConstParam.MusStress;
  AnyVar LfbarTemp = 0.080000; // Estimated value
  Lt0 = 0.1*LfbarTemp; // Estimated value
  __Lf_PARAM_ID =LfbarTemp;
  __Gamma_PARAM_ID = (pi/180)* 5.000000; // Estimated
  __Epsilon_PARAM_ID = EpsilonbarTemp;
  K1 = K1Temp;
  K2 = K2Temp;
  Fcfast = FcfastTemp;
  Jt = JtTemp;
  Jpe = JpeTemp;
  PEFactor = PEFactorTemp;
};

AnyMuscleModel3E pectoralis_minor_3 = {
  AnyVar PCSA = 85.700000; // mm^2 VU study
  F0 = .StrengthScaleHumerus*PCSA*.ConstParam.MusStress;
  AnyVar LfbarTemp = 0.080000; // Estimated value
  __Lf_PARAM_ID =LfbarTemp;
  Lt0 = 0.1*LfbarTemp; // Estimated value
  __Gamma_PARAM_ID = (pi/180)* 5.000000; // Estimated
  __Epsilon_PARAM_ID = EpsilonbarTemp;
  K1 = K1Temp;
  K2 = K2Temp;
  Fcfast = FcfastTemp;
  Jt = JtTemp;
  Jpe = JpeTemp;
  PEFactor = PEFactorTemp;
};

AnyMuscleModel3E pectoralis_minor_4 = {
  AnyVar PCSA = 85.700000; // mm^2 VU study
  F0 = .StrengthScaleHumerus*PCSA*.ConstParam.MusStress;
  AnyVar LfbarTemp = 0.080000; // Estimated value
  Lt0 = 0.1*LfbarTemp; // Estimated value
  __Lf_PARAM_ID =LfbarTemp;
  __Gamma_PARAM_ID = (pi/180)* 5.000000; // Estimated
  __Epsilon_PARAM_ID = EpsilonbarTemp;
  K1 = K1Temp;
  K2 = K2Temp;
  Fcfast = FcfastTemp;
  Jt = JtTemp;
  Jpe = JpeTemp;
  PEFactor = PEFactorTemp;
};

AnyMuscleModel3E rhomboideus_1 = {
  AnyVar PCSA = 252.300000; // mm^2 VU study
  F0 = .StrengthScaleHumerus*PCSA*.ConstParam.MusStress;
  AnyVar LfbarTemp = 0.068; //Kamibayashi1998
  Lt0 = 0.2*LfbarTemp;
  __Lf_PARAM_ID =LfbarTemp;
  __Gamma_PARAM_ID = (pi/180)* 5.000000; //Kamibayashi1998
  __Epsilon_PARAM_ID = EpsilonbarTemp;
  K1 = K1Temp;
  K2 = K2Temp;
  Fcfast = FcfastTemp;
  Jt = JtTemp;
  Jpe = JpeTemp;
  PEFactor = PEFactorTemp;
};

AnyMuscleModel3E rhomboideus_2 = {
  AnyVar PCSA = 252.300000; // mm^2 VU study
  F0 = .StrengthScaleHumerus*PCSA*.ConstParam.MusStress;
  AnyVar LfbarTemp = 0.068; //Kamibayashi1998
  __Lf_PARAM_ID =LfbarTemp;
  Lt0 = 0.2*LfbarTemp;
  __Gamma_PARAM_ID = (pi/180)* 5.000000; //Kamibayashi1998
  __Epsilon_PARAM_ID = EpsilonbarTemp;
  K1 = K1Temp;
  K2 = K2Temp;
  Fcfast = FcfastTemp;
  Jt = JtTemp;
  Jpe = JpeTemp;
  PEFactor = PEFactorTemp;
};

AnyMuscleModel3E rhomboideus_3 = {
  AnyVar PCSA = 252.300000; // mm^2 VU study
  F0 = .StrengthScaleHumerus*PCSA*.ConstParam.MusStress;
  AnyVar LfbarTemp = 0.068; //Kamibayashi1998
  __Lf_PARAM_ID =LfbarTemp;
  Lt0 = 0.2*LfbarTemp;
  __Gamma_PARAM_ID = (pi/180)* 5.000000; //Kamibayashi1998
  __Epsilon_PARAM_ID = EpsilonbarTemp;
  K1 = K1Temp;
  K2 = K2Temp;
  Fcfast = FcfastTemp;
  Jt = JtTemp;
  Jpe = JpeTemp;
  PEFactor = PEFactorTemp;
};

AnyMuscleModel3E serratus_anterior_1 = {
  AnyVar PCSA = 190.500000; // mm^2 VU study
  F0 = .StrengthScaleHumerus*PCSA*.ConstParam.MusStress;
  AnyVar LfbarTemp = 0.073; // Estimated
  __Lf_PARAM_ID =LfbarTemp;
  Lt0 = 0.1*LfbarTemp; // Estimated
  __Gamma_PARAM_ID = (pi/180)* 0.000000; // Estimated
  __Epsilon_PARAM_ID = EpsilonbarTemp;
  K1 = K1Temp;
  K2 = K2Temp;
  Fcfast = FcfastTemp;
  Jt = JtTemp;
  Jpe = JpeTemp;
  PEFactor = PEFactorTemp;
};

AnyMuscleModel3E serratus_anterior_2 = {
  AnyVar PCSA = 190.500000; // mm^2 VU study
  F0 = .StrengthScaleHumerus*PCSA*.ConstParam.MusStress;
  AnyVar LfbarTemp = 0.073; // Estimated
  __Lf_PARAM_ID =LfbarTemp;
  Lt0 = 0.1*LfbarTemp; // Estimated
  __Gamma_PARAM_ID = (pi/180)* 0.000000; // Estimated
  __Epsilon_PARAM_ID = EpsilonbarTemp;
  K1 = K1Temp;
  K2 = K2Temp;
  Fcfast = FcfastTemp;
  Jt = JtTemp;
  Jpe = JpeTemp;
  PEFactor = PEFactorTemp;
};

AnyMuscleModel3E serratus_anterior_3 = {
  AnyVar PCSA = 190.500000; // mm^2 VU study
  F0 = .StrengthScaleHumerus*PCSA*.ConstParam.MusStress;
  AnyVar LfbarTemp = 0.073; // Estimated
  __Lf_PARAM_ID =LfbarTemp;
  Lt0 = 0.1*LfbarTemp; // Estimated
  __Gamma_PARAM_ID = (pi/180)* 0.000000; // Estimated
  __Epsilon_PARAM_ID = EpsilonbarTemp;
  K1 = K1Temp;
  K2 = K2Temp;
  Fcfast = FcfastTemp;
  Jt = JtTemp;
  Jpe = JpeTemp;
  PEFactor = PEFactorTemp;
};

AnyMuscleModel3E serratus_anterior_4 = {
  AnyVar PCSA = 190.500000; // mm^2 VU study
  F0 = .StrengthScaleHumerus*PCSA*.ConstParam.MusStress;
  AnyVar LfbarTemp = 0.073; // Estimated
  __Lf_PARAM_ID =LfbarTemp;
  Lt0 = 0.1*LfbarTemp; // Estimated
  __Gamma_PARAM_ID = (pi/180)* 0.000000; // Estimated
  __Epsilon_PARAM_ID = EpsilonbarTemp;
  K1 = K1Temp;
  K2 = K2Temp;
  Fcfast = FcfastTemp;
  Jt = JtTemp;
  Jpe = JpeTemp;
  PEFactor = PEFactorTemp;
};

AnyMuscleModel3E serratus_anterior_5 = {
  AnyVar PCSA = 190.500000; // mm^2 VU study
  F0 = .StrengthScaleHumerus*PCSA*.ConstParam.MusStress;
  AnyVar LfbarTemp = 0.073; // Estimated
  __Lf_PARAM_ID =LfbarTemp;
  Lt0 = 0.1*LfbarTemp; // Estimated
  __Gamma_PARAM_ID = (pi/180)* 0.000000; // Estimated
  __Epsilon_PARAM_ID = EpsilonbarTemp;
  K1 = K1Temp;
  K2 = K2Temp;
  Fcfast = FcfastTemp;
  Jt = JtTemp;
  Jpe = JpeTemp;
  PEFactor = PEFactorTemp;
};

AnyMuscleModel3E serratus_anterior_6 = {
  AnyVar PCSA = 190.500000; // mm^2 VU study
  F0 = .StrengthScaleHumerus*PCSA*.ConstParam.MusStress;
  AnyVar LfbarTemp = 0.073; // Estimated
  __Lf_PARAM_ID =LfbarTemp;
  Lt0 = 0.1*LfbarTemp; // Estimated
  __Gamma_PARAM_ID = (pi/180)* 0.000000; // Estimated
  __Epsilon_PARAM_ID = EpsilonbarTemp;
  K1 = K1Temp;
  K2 = K2Temp;
  Fcfast = FcfastTemp;
  Jt = JtTemp;
  Jpe = JpeTemp;
  PEFactor = PEFactorTemp;
};


//Moved from neck model
AnyMuscleModel SternocleidomastoidPar = {
  AnyVar PCSA = 4.92/2 * 100; //Physiological Cross Sectional Area in mm2
  F0 = .StrengthScaleHumerus*PCSA*.ConstParam.MusStress;
};


AnyMuscleModel3E subscapularis_1 = {
  AnyVar PCSA = 250.000000; // mm^2 VU study
  F0 = .StrengthScaleHumerus*PCSA*.ConstParam.MusStress;
  AnyVar LfbarTemp = 0.080; //Guesstimate
  __Lf_PARAM_ID =LfbarTemp;
  Lt0 = 0.5*LfbarTemp;
  __Gamma_PARAM_ID = (pi/180)* 4.000000;
  __Epsilon_PARAM_ID = EpsilonbarTemp;
  K1 = K1Temp;
  K2 = K2Temp;
  Fcfast = FcfastTemp;
  Jt = JtTemp;
  Jpe = JpeTemp;
  PEFactor = PEFactorTemp;
};

AnyMuscleModel3E subscapularis_2 = {
  AnyVar PCSA = 250.000000; // mm^2 VU study
  F0 = .StrengthScaleHumerus*PCSA*.ConstParam.MusStress;
  AnyVar LfbarTemp = 0.080; //Guesstimate
  __Lf_PARAM_ID =LfbarTemp;
  Lt0 = 0.5*LfbarTemp;
  __Gamma_PARAM_ID = (pi/180)* 4.000000;
  __Epsilon_PARAM_ID = EpsilonbarTemp;
  K1 = K1Temp;
  K2 = K2Temp;
  Fcfast = FcfastTemp;
  Jt = JtTemp;
  Jpe = JpeTemp;
  PEFactor = PEFactorTemp;
};

AnyMuscleModel3E subscapularis_3 = {
  AnyVar PCSA = 250.000000; // mm^2 VU study
  F0 = .StrengthScaleHumerus*PCSA*.ConstParam.MusStress;
  AnyVar LfbarTemp = 0.080; //Guesstimate
  __Lf_PARAM_ID =LfbarTemp;
  Lt0 = 0.5*LfbarTemp;
  __Gamma_PARAM_ID = (pi/180)* 4.000000;
  __Epsilon_PARAM_ID = EpsilonbarTemp;
  K1 = K1Temp;
  K2 = K2Temp;
  Fcfast = FcfastTemp;
  Jt = JtTemp;
  Jpe = JpeTemp;
  PEFactor = PEFactorTemp;
};

AnyMuscleModel3E subscapularis_4 = {
  AnyVar PCSA = 250.000000; // mm^2 VU study
  F0 = .StrengthScaleHumerus*PCSA*.ConstParam.MusStress;
  AnyVar LfbarTemp = 0.080; //Guesstimate
  __Lf_PARAM_ID =LfbarTemp;
  Lt0 = 0.5*LfbarTemp;
  __Gamma_PARAM_ID = (pi/180)* 4.000000;
  __Epsilon_PARAM_ID = EpsilonbarTemp;
  K1 = K1Temp;
  K2 = K2Temp;
  Fcfast = FcfastTemp;
  Jt = JtTemp;
  Jpe = JpeTemp;
  PEFactor = PEFactorTemp;
};

AnyMuscleModel3E subscapularis_5 = {
  AnyVar PCSA = 250.000000; // mm^2 VU study
  F0 = .StrengthScaleHumerus*PCSA*.ConstParam.MusStress;
  AnyVar LfbarTemp = 0.080; //Guesstimate
  __Lf_PARAM_ID =LfbarTemp;
  Lt0 = 0.5*LfbarTemp;
  __Gamma_PARAM_ID = (pi/180)* 4.000000;
  __Epsilon_PARAM_ID = EpsilonbarTemp;
  K1 = K1Temp;
  K2 = K2Temp;
  Fcfast = FcfastTemp;
  Jt = JtTemp;
  Jpe = JpeTemp;
  PEFactor = PEFactorTemp;
};

AnyMuscleModel3E subscapularis_6 = {
  AnyVar PCSA = 250.000000; // mm^2 VU study
  F0 = .StrengthScaleHumerus*PCSA*.ConstParam.MusStress;
  AnyVar LfbarTemp = 0.080; //Guesstimate
  __Lf_PARAM_ID =LfbarTemp;
  Lt0 = 0.5*LfbarTemp;
  __Gamma_PARAM_ID = (pi/180)* 4.000000;
  __Epsilon_PARAM_ID = EpsilonbarTemp;
  K1 = K1Temp;
  K2 = K2Temp;
  Fcfast = FcfastTemp;
  Jt = JtTemp;
  Jpe = JpeTemp;
  PEFactor = PEFactorTemp;
};

// supra 1 = anterieur
AnyMuscleModel3E supraspinatus_1 = {
  AnyVar PCSA = 78.000000; // mm^2 VU study
  F0 = .StrengthScaleHumerus*PCSA*.ConstParam.MusStress;
  AnyVar LfbarTemp = 0.0470; // Juul-Kristensen2000
  __Lf_PARAM_ID =LfbarTemp;
  Lt0 = 0.08*LfbarTemp; // Estimated
  __Gamma_PARAM_ID = (pi/180)* 0.000000; // Estimated
  __Epsilon_PARAM_ID = EpsilonbarTemp;
  K1 = K1Temp;
  K2 = K2Temp;
  Fcfast = FcfastTemp;
  Jt = JtTemp;
  Jpe = JpeTemp;
  PEFactor = PEFactorTemp;
};

AnyMuscleModel3E supraspinatus_2 = {
  AnyVar PCSA = 78.000000; // mm^2 VU study
  F0 = .StrengthScaleHumerus*PCSA*.ConstParam.MusStress;
  AnyVar LfbarTemp = 0.0470; // Juul-Kristensen2000
  __Lf_PARAM_ID =LfbarTemp;
  Lt0 = 0.08*LfbarTemp; // Estimated
  __Gamma_PARAM_ID = (pi/180)* 0.000000; // Estimated
  __Epsilon_PARAM_ID = EpsilonbarTemp;
  K1 = K1Temp;
  K2 = K2Temp;
  Fcfast = FcfastTemp;
  Jt = JtTemp;
  Jpe = JpeTemp;
  PEFactor = PEFactorTemp;
};

AnyMuscleModel3E supraspinatus_3 = {
  AnyVar PCSA = 78.000000; // mm^2 VU study
  F0 = .StrengthScaleHumerus*PCSA*.ConstParam.MusStress;
  AnyVar LfbarTemp = 0.0470; // Juul-Kristensen2000
  __Lf_PARAM_ID =LfbarTemp;
  Lt0 = 0.08*LfbarTemp; // Estimated
  __Gamma_PARAM_ID = (pi/180)* 0.000000; // Estimated
  __Epsilon_PARAM_ID = EpsilonbarTemp;
  K1 = K1Temp;
  K2 = K2Temp;
  Fcfast = FcfastTemp;
  Jt = JtTemp;
  Jpe = JpeTemp;
  PEFactor = PEFactorTemp;
};

AnyMuscleModel3E supraspinatus_4 = {
  AnyVar PCSA = 78.000000; // mm^2 VU study
  F0 = .StrengthScaleHumerus*PCSA*.ConstParam.MusStress;
  AnyVar LfbarTemp = 0.0470; // Juul-Kristensen2000
  __Lf_PARAM_ID =LfbarTemp;
  Lt0 = 0.08*LfbarTemp; // Estimated
  __Gamma_PARAM_ID = (pi/180)* 0.000000; // Estimated
  __Epsilon_PARAM_ID = EpsilonbarTemp;
  K1 = K1Temp;
  K2 = K2Temp;
  Fcfast = FcfastTemp;
  Jt = JtTemp;
  Jpe = JpeTemp;
  PEFactor = PEFactorTemp;
};

AnyMuscleModel3E supraspinatus_5 = {
  AnyVar PCSA = 78.000000; // mm^2 VU study
  F0 = .StrengthScaleHumerus*PCSA*.ConstParam.MusStress;
  AnyVar LfbarTemp = 0.0470; // Juul-Kristensen2000
  __Lf_PARAM_ID =LfbarTemp;
  Lt0 = 0.08*LfbarTemp; // Estimated
  __Gamma_PARAM_ID = (pi/180)* 0.000000; // Estimated
  __Epsilon_PARAM_ID = EpsilonbarTemp;
  K1 = K1Temp;
  K2 = K2Temp;
  Fcfast = FcfastTemp;
  Jt = JtTemp;
  Jpe = JpeTemp;
  PEFactor = PEFactorTemp;
};

AnyMuscleModel3E supraspinatus_6 = {
  AnyVar PCSA = 78.000000; // mm^2 VU study
  F0 = .StrengthScaleHumerus*PCSA*.ConstParam.MusStress;
  AnyVar LfbarTemp = 0.0470; // Juul-Kristensen2000
  __Lf_PARAM_ID =LfbarTemp;
  Lt0 = 0.08*LfbarTemp; // Estimated
  __Gamma_PARAM_ID = (pi/180)* 0.000000; // Estimated
  __Epsilon_PARAM_ID = EpsilonbarTemp;
  K1 = K1Temp;
  K2 = K2Temp;
  Fcfast = FcfastTemp;
  Jt = JtTemp;
  Jpe = JpeTemp;
  PEFactor = PEFactorTemp;
};

AnyMuscleModel3E teres_major_1 = {
  AnyVar PCSA = 50.00000; //Holzbaur2005
  F0 = .StrengthScaleHumerus*PCSA*.ConstParam.MusStress;
  AnyVar LfbarTemp = 0.100000; // Estimated
  __Lf_PARAM_ID =LfbarTemp;
  Lt0 = 0.1*LfbarTemp;
  __Gamma_PARAM_ID = (pi/180)* 2.000000;
  __Epsilon_PARAM_ID = EpsilonbarTemp;
  K1 = K1Temp;
  K2 = K2Temp;
  Fcfast = FcfastTemp;
  Jt = JtTemp;
  Jpe = JpeTemp;
  PEFactor = PEFactorTemp;
};

AnyMuscleModel3E teres_major_2 = {
  AnyVar PCSA = 50.00000; //Holzbaur2005
  F0 = .StrengthScaleHumerus*PCSA*.ConstParam.MusStress;
  AnyVar LfbarTemp = 0.100000; // Estimated
  __Lf_PARAM_ID =LfbarTemp;
  Lt0 = 0.1*LfbarTemp;
  __Gamma_PARAM_ID = (pi/180)* 2.000000;
  __Epsilon_PARAM_ID = EpsilonbarTemp;
  K1 = K1Temp;
  K2 = K2Temp;
  Fcfast = FcfastTemp;
  Jt = JtTemp;
  Jpe = JpeTemp;
  PEFactor = PEFactorTemp;
};

AnyMuscleModel3E teres_major_3 = {
  AnyVar PCSA = 50.00000; //Holzbaur2005
  F0 = .StrengthScaleHumerus*PCSA*.ConstParam.MusStress;
  AnyVar LfbarTemp = 0.100000; // Estimated
  __Lf_PARAM_ID =LfbarTemp;
  Lt0 = 0.1*LfbarTemp;
  __Gamma_PARAM_ID = (pi/180)* 2.000000;
  __Epsilon_PARAM_ID = EpsilonbarTemp;
  K1 = K1Temp;
  K2 = K2Temp;
  Fcfast = FcfastTemp;
  Jt = JtTemp;
  Jpe = JpeTemp;
  PEFactor = PEFactorTemp;
};

AnyMuscleModel3E teres_major_4 = {
  AnyVar PCSA = 50.00000; //Holzbaur2005
  F0 = .StrengthScaleHumerus*PCSA*.ConstParam.MusStress;
  AnyVar LfbarTemp = 0.100000; // Estimated
  __Lf_PARAM_ID =LfbarTemp;
  Lt0 = 0.1*LfbarTemp;
  __Gamma_PARAM_ID = (pi/180)* 2.000000;
  __Epsilon_PARAM_ID = EpsilonbarTemp;
  K1 = K1Temp;
  K2 = K2Temp;
  Fcfast = FcfastTemp;
  Jt = JtTemp;
  Jpe = JpeTemp;
  PEFactor = PEFactorTemp;
};

AnyMuscleModel3E teres_major_5 = {
  AnyVar PCSA = 50.00000; //Holzbaur2005
  F0 = .StrengthScaleHumerus*PCSA*.ConstParam.MusStress;
  AnyVar LfbarTemp = 0.100000; // Estimated
  __Lf_PARAM_ID =LfbarTemp;
  Lt0 = 0.1*LfbarTemp;
  __Gamma_PARAM_ID = (pi/180)* 2.000000;
  __Epsilon_PARAM_ID = EpsilonbarTemp;
  K1 = K1Temp;
  K2 = K2Temp;
  Fcfast = FcfastTemp;
  Jt = JtTemp;
  Jpe = JpeTemp;
  PEFactor = PEFactorTemp;
};

AnyMuscleModel3E teres_major_6 = {
  AnyVar PCSA = 50.00000; //Holzbaur2005
  F0 = .StrengthScaleHumerus*PCSA*.ConstParam.MusStress;
  AnyVar LfbarTemp = 0.100000; // Estimated
  __Lf_PARAM_ID =LfbarTemp;
  Lt0 = 0.1*LfbarTemp;
  __Gamma_PARAM_ID = (pi/180)* 2.000000;
  __Epsilon_PARAM_ID = EpsilonbarTemp;
  K1 = K1Temp;
  K2 = K2Temp;
  Fcfast = FcfastTemp;
  Jt = JtTemp;
  Jpe = JpeTemp;
  PEFactor = PEFactorTemp;
};

AnyMuscleModel3E teres_minor_1 = {
  AnyVar PCSA = 51.600000; // mm^2 VU study
  F0 = .StrengthScaleHumerus*PCSA*.ConstParam.MusStress;
  AnyVar LfbarTemp = 0.07000; // Estimated
  __Lf_PARAM_ID =LfbarTemp;
  Lt0 = 0.1*LfbarTemp; // Estimated
  __Gamma_PARAM_ID = (pi/180)* 2.000000; // Estimated
  __Epsilon_PARAM_ID = EpsilonbarTemp;
  K1 = K1Temp;
  K2 = K2Temp;
  Fcfast = FcfastTemp;
  Jt = JtTemp;
  Jpe = JpeTemp;
  PEFactor = PEFactorTemp;
};

AnyMuscleModel3E teres_minor_2 = {
  AnyVar PCSA = 51.600000; // mm^2 VU study
  F0 = .StrengthScaleHumerus*PCSA*.ConstParam.MusStress;
  AnyVar LfbarTemp = 0.07000; // Estimated
  __Lf_PARAM_ID =LfbarTemp;
  Lt0 = 0.1*LfbarTemp; // Estimated
  __Gamma_PARAM_ID = (pi/180)* 2.000000; // Estimated
  __Epsilon_PARAM_ID = EpsilonbarTemp;
  K1 = K1Temp;
  K2 = K2Temp;
  Fcfast = FcfastTemp;
  Jt = JtTemp;
  Jpe = JpeTemp;
  PEFactor = PEFactorTemp;
};

AnyMuscleModel3E teres_minor_3 = {
  AnyVar PCSA = 51.600000; // mm^2 VU study
  F0 = .StrengthScaleHumerus*PCSA*.ConstParam.MusStress;
  AnyVar LfbarTemp = 0.07000; // Estimated
  Lt0 = 0.1*LfbarTemp; // Estimated
  __Lf_PARAM_ID =LfbarTemp;
  __Gamma_PARAM_ID = (pi/180)* 2.000000; // Estimated
  __Epsilon_PARAM_ID = EpsilonbarTemp;
  K1 = K1Temp;
  K2 = K2Temp;
  Fcfast = FcfastTemp;
  Jt = JtTemp;
  Jpe = JpeTemp;
  PEFactor = PEFactorTemp;
};

AnyMuscleModel3E teres_minor_4 = {
  AnyVar PCSA = 51.600000; // mm^2 VU study
  F0 = .StrengthScaleHumerus*PCSA*.ConstParam.MusStress;
  AnyVar LfbarTemp = 0.07000; // Estimated
  __Lf_PARAM_ID =LfbarTemp;
  Lt0 = 0.1*LfbarTemp; // Estimated
  __Gamma_PARAM_ID = (pi/180)* 2.000000; // Estimated
  __Epsilon_PARAM_ID = EpsilonbarTemp;
  K1 = K1Temp;
  K2 = K2Temp;
  Fcfast = FcfastTemp;
  Jt = JtTemp;
  Jpe = JpeTemp;
  PEFactor = PEFactorTemp;
};

AnyMuscleModel3E teres_minor_5 = {
  AnyVar PCSA = 51.600000; // mm^2 VU study
  F0 = .StrengthScaleHumerus*PCSA*.ConstParam.MusStress;
  AnyVar LfbarTemp = 0.07000; // Estimated
  __Lf_PARAM_ID =LfbarTemp;
  Lt0 = 0.1*LfbarTemp; // Estimated
  __Gamma_PARAM_ID = (pi/180)* 2.000000; // Estimated
  __Epsilon_PARAM_ID = EpsilonbarTemp;
  K1 = K1Temp;
  K2 = K2Temp;
  Fcfast = FcfastTemp;
  Jt = JtTemp;
  Jpe = JpeTemp;
  PEFactor = PEFactorTemp;
};

AnyMuscleModel3E teres_minor_6 = {
  AnyVar PCSA = 51.600000; // mm^2 VU study
  F0 = .StrengthScaleHumerus*PCSA*.ConstParam.MusStress;
  AnyVar LfbarTemp = 0.07000; // Estimated
  __Lf_PARAM_ID =LfbarTemp;
  Lt0 = 0.1*LfbarTemp; // Estimated
  __Gamma_PARAM_ID = (pi/180)* 2.000000; // Estimated
  __Epsilon_PARAM_ID = EpsilonbarTemp;
  K1 = K1Temp;
  K2 = K2Temp;
  Fcfast = FcfastTemp;
  Jt = JtTemp;
  Jpe = JpeTemp;
  PEFactor = PEFactorTemp;
};

AnyMuscleModel3E trapezius_scapular_part_1 = {
  AnyVar PCSA = 145.500000; // mm^2 VU study
  F0 = .StrengthScaleHumerus*PCSA*.ConstParam.MusStress;
  AnyVar LfbarTemp = 0.10000;
  __Lf_PARAM_ID =LfbarTemp;
  Lt0 = 0.2*LfbarTemp;
  __Gamma_PARAM_ID = (pi/180)* 10.000000; // Yamaguchi
  __Epsilon_PARAM_ID = EpsilonbarTemp;
  K1 = K1Temp;
  K2 = K2Temp;
  Fcfast = FcfastTemp;
  Jt = JtTemp;
  Jpe = JpeTemp;
  PEFactor = PEFactorTemp;
};

AnyMuscleModel3E trapezius_scapular_part_2 = {
  AnyVar PCSA = 145.500000; // mm^2 VU study
  F0 = .StrengthScaleHumerus*PCSA*.ConstParam.MusStress;
  AnyVar LfbarTemp = 0.10000;
  __Lf_PARAM_ID =LfbarTemp;
  Lt0 = 0.2*LfbarTemp;
  __Gamma_PARAM_ID = (pi/180)* 10.000000; // Yamaguchi
  __Epsilon_PARAM_ID = EpsilonbarTemp;
  K1 = K1Temp;
  K2 = K2Temp;
  Fcfast = FcfastTemp;
  Jt = JtTemp;
  Jpe = JpeTemp;
  PEFactor = PEFactorTemp;
};

AnyMuscleModel3E trapezius_scapular_part_3 = {
  AnyVar PCSA = 145.500000; // mm^2 VU study
  F0 = .StrengthScaleHumerus*PCSA*.ConstParam.MusStress;
  AnyVar LfbarTemp = 0.10000;
  __Lf_PARAM_ID =LfbarTemp;
  Lt0 = 0.2*LfbarTemp;
  __Gamma_PARAM_ID = (pi/180)* 10.000000; // Yamaguchi
  __Epsilon_PARAM_ID = EpsilonbarTemp;
  K1 = K1Temp;
  K2 = K2Temp;
  Fcfast = FcfastTemp;
  Jt = JtTemp;
  Jpe = JpeTemp;
  PEFactor = PEFactorTemp;
};

AnyMuscleModel3E trapezius_scapular_part_4 = {
  AnyVar PCSA = 145.500000; // mm^2 VU study
  F0 = .StrengthScaleHumerus*PCSA*.ConstParam.MusStress;
  AnyVar LfbarTemp = 0.10000;
  __Lf_PARAM_ID =LfbarTemp;
  Lt0 = 0.2*LfbarTemp;
  __Gamma_PARAM_ID = (pi/180)* 10.000000; // Yamaguchi
  __Epsilon_PARAM_ID = EpsilonbarTemp;
  K1 = K1Temp;
  K2 = K2Temp;
  Fcfast = FcfastTemp;
  Jt = JtTemp;
  Jpe = JpeTemp;
  PEFactor = PEFactorTemp;
};

AnyMuscleModel3E trapezius_scapular_part_5 = {
  AnyVar PCSA = 145.500000; // mm^2 VU study
  F0 = .StrengthScaleHumerus*PCSA*.ConstParam.MusStress;
  AnyVar LfbarTemp = 0.10000;
  __Lf_PARAM_ID =LfbarTemp;
  Lt0 = 0.2*LfbarTemp;
  __Gamma_PARAM_ID = (pi/180)* 10.000000; // Yamaguchi
  __Epsilon_PARAM_ID = EpsilonbarTemp;
  K1 = K1Temp;
  K2 = K2Temp;
  Fcfast = FcfastTemp;
  Jt = JtTemp;
  Jpe = JpeTemp;
  PEFactor = PEFactorTemp;
};

AnyMuscleModel3E trapezius_scapular_part_6 = {
  AnyVar PCSA = 145.500000; // mm^2 VU study
  F0 = .StrengthScaleHumerus*PCSA*.ConstParam.MusStress;
  AnyVar LfbarTemp = 0.10000;
  __Lf_PARAM_ID =LfbarTemp;
  Lt0 = 0.2*LfbarTemp;
  __Gamma_PARAM_ID = (pi/180)* 10.000000; // Yamaguchi
  __Epsilon_PARAM_ID = EpsilonbarTemp;
  K1 = K1Temp;
  K2 = K2Temp;
  Fcfast = FcfastTemp;
  Jt = JtTemp;
  Jpe = JpeTemp;
  PEFactor = PEFactorTemp;
};

AnyMuscleModel3E trapezius_clavicular_part_1 = {
  AnyVar PCSA = 145.500000; // mm^2 VU study
  F0 = .StrengthScaleHumerus*PCSA*.ConstParam.MusStress;
  AnyVar LfbarTemp = 0.10000;
  __Lf_PARAM_ID =LfbarTemp;
  Lt0 = 0.1*LfbarTemp;
  __Gamma_PARAM_ID = (pi/180)* 10.000000; // Yamaguchi
  __Epsilon_PARAM_ID = EpsilonbarTemp;
  K1 = K1Temp;
  K2 = K2Temp;
  Fcfast = FcfastTemp;
  Jt = JtTemp;
  Jpe = JpeTemp;
  PEFactor = PEFactorTemp;
};

AnyMuscleModel3E trapezius_clavicular_part_2 = {
  AnyVar PCSA = 145.500000; // mm^2 VU study
  F0 = .StrengthScaleHumerus*PCSA*.ConstParam.MusStress;
  AnyVar LfbarTemp = 0.10000;
  __Lf_PARAM_ID =LfbarTemp;
  Lt0 = 0.1*LfbarTemp;
  __Gamma_PARAM_ID = (pi/180)* 10.000000; // Yamaguchi
  __Epsilon_PARAM_ID = EpsilonbarTemp;
  K1 = K1Temp;
  K2 = K2Temp;
  Fcfast = FcfastTemp;
  Jt = JtTemp;
  Jpe = JpeTemp;
  PEFactor = PEFactorTemp;
};

AnyMuscleModel3E trapezius_clavicular_part_3 = {
  AnyVar PCSA = 145.500000; // mm^2 VU study
  F0 = .StrengthScaleHumerus*PCSA*.ConstParam.MusStress;
  AnyVar LfbarTemp = 0.10000;
  __Lf_PARAM_ID =LfbarTemp;
  Lt0 = 0.1*LfbarTemp;
  __Gamma_PARAM_ID = (pi/180)* 10.000000; // Yamaguchi
  __Epsilon_PARAM_ID = EpsilonbarTemp;
  K1 = K1Temp;
  K2 = K2Temp;
  Fcfast = FcfastTemp;
  Jt = JtTemp;
  Jpe = JpeTemp;
  PEFactor = PEFactorTemp;
};

AnyMuscleModel3E trapezius_clavicular_part_4 = {
  AnyVar PCSA = 145.500000; // mm^2 VU study
  F0 = .StrengthScaleHumerus*PCSA*.ConstParam.MusStress;
  AnyVar LfbarTemp = 0.10000;
  __Lf_PARAM_ID =LfbarTemp;
  Lt0 = 0.1*LfbarTemp;
  __Gamma_PARAM_ID = (pi/180)* 10.000000; // Yamaguchi
  __Epsilon_PARAM_ID = EpsilonbarTemp;
  K1 = K1Temp;
  K2 = K2Temp;
  Fcfast = FcfastTemp;
  Jt = JtTemp;
  Jpe = JpeTemp;
  PEFactor = PEFactorTemp;
};

AnyMuscleModel3E trapezius_clavicular_part_5 = {
  AnyVar PCSA = 145.500000; // mm^2 VU study
  F0 = .StrengthScaleHumerus*PCSA*.ConstParam.MusStress;
  AnyVar LfbarTemp = 0.10000;
  __Lf_PARAM_ID =LfbarTemp;
  Lt0 = 0.1*LfbarTemp;
  __Gamma_PARAM_ID = (pi/180)* 10.000000; // Yamaguchi
  __Epsilon_PARAM_ID = EpsilonbarTemp;
  K1 = K1Temp;
  K2 = K2Temp;
  Fcfast = FcfastTemp;
  Jt = JtTemp;
  Jpe = JpeTemp;
  PEFactor = PEFactorTemp;
};

AnyMuscleModel3E trapezius_clavicular_part_6 = {
  AnyVar PCSA = 145.500000; // mm^2 VU study
  F0 = .StrengthScaleHumerus*PCSA*.ConstParam.MusStress;
  AnyVar LfbarTemp = 0.10000;
  __Lf_PARAM_ID =LfbarTemp;
  Lt0 = 0.1*LfbarTemp;
  __Gamma_PARAM_ID = (pi/180)* 10.000000; // Yamaguchi
  __Epsilon_PARAM_ID = EpsilonbarTemp;
  K1 = K1Temp;
  K2 = K2Temp;
  Fcfast = FcfastTemp;
  Jt = JtTemp;
  Jpe = JpeTemp;
  PEFactor = PEFactorTemp;
};


// ****************************************
//Muscle parameters for the forearm, data from MAYO sub2
// ****************************************
AnyMuscleModel3E Triceps_LH_1 = {
  AnyVar Volume = 0.5*146.00000/10^6; //m^3 mayo k2_2
  AnyVar MuscleBellyLength = 0.300; //m mayo k2_2
  AnyVar PCSA = Volume/(MuscleBellyLength*cos(Gammabar));
  AnyVar Lt0Temp = 0.35*LfbarTemp;

  F0 = .StrengthScaleHumerus*PCSA*.ConstParam.MusStressForearm;
  AnyVar  LfbarTemp = 0.094000;//mm mayo k2_2
  __Lf_PARAM_ID = LfbarTemp;

  Lt0 = Lt0Temp;
  __Gamma_PARAM_ID = GammabarTemp;
  __Epsilon_PARAM_ID = EpsilonbarTemp;
  K1 = K1Temp;
  K2 = K2Temp;
  Fcfast = FcfastTemp;
  Jt = JtTemp;
  Jpe = JpeTemp;
  PEFactor = PEFactorTemp;
};

AnyMuscleModel3E Triceps_LH_2 = {
  AnyVar Volume = 0.5*146.00000/10^6; //m^3 mayo k2_2
  AnyVar MuscleBellyLength = 0.300; //m mayo k2_2
  AnyVar PCSA = Volume/(MuscleBellyLength*cos(Gammabar));

  F0 = .StrengthScaleHumerus*PCSA*.ConstParam.MusStressForearm;
  AnyVar   LfbarTemp = 0.094000;//mm mayo k2_2
  AnyVar Lt0Temp = 0.35*LfbarTemp;

  __Lf_PARAM_ID = LfbarTemp;
  Lt0 = Lt0Temp;
  __Gamma_PARAM_ID = GammabarTemp;
  __Epsilon_PARAM_ID = EpsilonbarTemp;
  K1 = K1Temp;
  K2 = K2Temp;
  Fcfast = FcfastTemp;
  Jt = JtTemp;
  Jpe = JpeTemp;
  PEFactor = PEFactorTemp;
};

AnyMuscleModel3E Brachialis_1 = {
  AnyVar Volume= 0.5*102.00000/10^6; //m^3 mayo k2_2
  AnyVar MuscleBellyLength = 0.173; //m mayo k2_2
  AnyVar PCSA= Volume/(MuscleBellyLength*cos(Gammabar));

  F0 = .StrengthScaleHumerus*PCSA*.ConstParam.MusStressForearm;
  AnyVar   LfbarTemp = 0.123000;
  __Lf_PARAM_ID = LfbarTemp;
  Lt0 = Lt0Temp;
  AnyVar Lt0Temp = 0.15*LfbarTemp;

  __Gamma_PARAM_ID = GammabarTemp;
  __Epsilon_PARAM_ID = EpsilonbarTemp;
  K1 = K1Temp;
  K2 = K2Temp;
  Fcfast = FcfastTemp;
  Jt = JtTemp;
  Jpe = JpeTemp;
  PEFactor = PEFactorTemp;
};

AnyMuscleModel3E Brachialis_2 = {
  AnyVar Volume= 0.5*102.00000/10^6; //m^3 mayo k2_2
  AnyVar MuscleBellyLength = 0.173; //m mayo k2_2
  AnyVar PCSA= Volume/(MuscleBellyLength*cos(Gammabar));

  F0 = .StrengthScaleHumerus*PCSA*.ConstParam.MusStressForearm;
  AnyVar   LfbarTemp = 0.123000;//mm mayo k2_2
  __Lf_PARAM_ID = LfbarTemp;
  AnyVar Lt0Temp = 0.15*LfbarTemp;

  Lt0 = Lt0Temp;
  __Gamma_PARAM_ID = GammabarTemp;
  __Epsilon_PARAM_ID = EpsilonbarTemp;
  K1 = K1Temp;
  K2 = K2Temp;
  Fcfast = FcfastTemp;
  Jt = JtTemp;
  Jpe = JpeTemp;
  PEFactor = PEFactorTemp;
};

AnyMuscleModel3E Triceps_ME_1 = {
  AnyVar Volume= 0.5*160.00000/10^6; //m^3 mayo k2_2
  AnyVar MuscleBellyLength = 0.250; //m mayo k2_2
  AnyVar PCSA= Volume/(MuscleBellyLength*cos(Gammabar));

  F0 = .StrengthScaleHumerus*PCSA*.ConstParam.MusStressForearm;
  AnyVar LfbarTemp = 0.087000;//mm mayo k2_2
  __Lf_PARAM_ID = LfbarTemp;
  AnyVar Lt0Temp = 0.15*LfbarTemp;

  Lt0 = Lt0Temp;
  __Gamma_PARAM_ID = GammabarTemp;
  __Epsilon_PARAM_ID = EpsilonbarTemp;
  K1 = K1Temp;
  K2 = K2Temp;
  Fcfast = FcfastTemp;
  Jt = JtTemp;
  Jpe = JpeTemp;
  PEFactor = PEFactorTemp;
};

AnyMuscleModel3E Triceps_ME_2 = {
  AnyVar Volume= 0.5*160.00000/10^6; //m^3 mayo k2_2
  AnyVar MuscleBellyLength = 0.250; //m mayo k2_2
  AnyVar PCSA= Volume/(MuscleBellyLength*cos(Gammabar));

  F0 = .StrengthScaleHumerus*PCSA*.ConstParam.MusStressForearm;
  AnyVar  LfbarTemp = 0.087000;//mm mayo k2_2
  __Lf_PARAM_ID = LfbarTemp;
  AnyVar Lt0Temp = 0.15*LfbarTemp;

  Lt0 = Lt0Temp;
  __Gamma_PARAM_ID = GammabarTemp;
  __Epsilon_PARAM_ID = EpsilonbarTemp;
  K1 = K1Temp;
  K2 = K2Temp;
  Fcfast = FcfastTemp;
  Jt = JtTemp;
  Jpe = JpeTemp;
  PEFactor = PEFactorTemp;
};

AnyMuscleModel3E Triceps_LA_1 = {
  AnyVar Volume= 0.5*108.00000/10^6; //m^3 mayo k2_2
  AnyVar MuscleBellyLength = 0.260; //m mayo k2_2
  AnyVar PCSA= Volume/(MuscleBellyLength*cos(Gammabar));

  F0 = .StrengthScaleHumerus*PCSA*.ConstParam.MusStressForearm;
  AnyVar  LfbarTemp = 0.055000;//mm mayo k2_2
  __Lf_PARAM_ID = LfbarTemp;
  AnyVar Lt0Temp = 0.25*LfbarTemp;

  Lt0 = Lt0Temp;
  __Gamma_PARAM_ID = GammabarTemp;
  __Epsilon_PARAM_ID = EpsilonbarTemp;
  K1 = K1Temp;
  K2 = K2Temp;
  Fcfast = FcfastTemp;
  Jt = JtTemp;
  Jpe = JpeTemp;
  PEFactor = PEFactorTemp;
};

AnyMuscleModel3E Triceps_LA_2 = {
  AnyVar Volume= 0.5*108.00000/10^6; //m^3 mayo k2_2
  AnyVar MuscleBellyLength = 0.260; //m mayo k2_2
  AnyVar PCSA= Volume/(MuscleBellyLength*cos(Gammabar));

  F0 = .StrengthScaleHumerus*PCSA*.ConstParam.MusStressForearm;
  AnyVar  LfbarTemp = 0.055000;//mm mayo k2_2
  __Lf_PARAM_ID = LfbarTemp;
  AnyVar Lt0Temp = 0.25*LfbarTemp;

  Lt0 = Lt0Temp;
  __Gamma_PARAM_ID = GammabarTemp;
  __Epsilon_PARAM_ID = EpsilonbarTemp;
  K1 = K1Temp;
  K2 = K2Temp;
  Fcfast = FcfastTemp;
  Jt = JtTemp;
  Jpe = JpeTemp;
  PEFactor = PEFactorTemp;
};

AnyMuscleModel3E Brach_rad_1 = {
  AnyVar Volume= 0.5*34.00000/10^6; //m^3 mayo k2_2
  AnyVar MuscleBellyLength = 0.160; //m mayo k2_2
  AnyVar PCSA= Volume/(MuscleBellyLength*cos(Gammabar));

  F0 = .StrengthScaleUlna*PCSA*.ConstParam.MusStressForearm;
  AnyVar  LfbarTemp = 0.128000;//mm mayo k2_2
  __Lf_PARAM_ID = LfbarTemp;
  AnyVar Lt0Temp = 0.15*LfbarTemp;

  Lt0 = Lt0Temp;
  __Gamma_PARAM_ID = GammabarTemp;
  __Epsilon_PARAM_ID = EpsilonbarTemp;
  K1 = K1Temp;
  K2 = K2Temp;
  Fcfast = FcfastTemp;
  Jt = JtTemp;
  Jpe = JpeTemp;
  PEFactor = PEFactorTemp;
};

AnyMuscleModel3E Brach_rad_2 = {
  AnyVar Volume= 0.5*34.00000/10^6; //m^3 mayo k2_2
  AnyVar MuscleBellyLength = 0.160; //m mayo k2_2
  AnyVar PCSA= Volume/(MuscleBellyLength*cos(Gammabar));

  F0 = .StrengthScaleUlna*PCSA*.ConstParam.MusStressForearm;
  AnyVar   LfbarTemp = 0.128000;//mm mayo k2_2
  __Lf_PARAM_ID = LfbarTemp;
  AnyVar Lt0Temp = 0.15*LfbarTemp;

  Lt0 = Lt0Temp;
  __Gamma_PARAM_ID = GammabarTemp;
  __Epsilon_PARAM_ID = EpsilonbarTemp;
  K1 = K1Temp;
  K2 = K2Temp;
  Fcfast = FcfastTemp;
  Jt = JtTemp;
  Jpe = JpeTemp;
  PEFactor = PEFactorTemp;
};

AnyMuscleModel3E Anconeus_1 = {
  AnyVar Volume= 0.5*8.00000/10^6; //m^3 mayo k2_2
  AnyVar MuscleBellyLength = 0.50; //m mayo k2_2 guesstimate from other subject
  AnyVar PCSA= Volume/(MuscleBellyLength*cos(Gammabar));

  F0 = .StrengthScaleUlna*PCSA*.ConstParam.MusStressForearm;
  AnyVar  LfbarTemp = 0.024000;//mm mayo k2_2
  __Lf_PARAM_ID = LfbarTemp;
  AnyVar Lt0Temp = 0.25*LfbarTemp;
  Lt0 = Lt0Temp;
  __Gamma_PARAM_ID = GammabarTemp;
  __Epsilon_PARAM_ID = EpsilonbarTemp;
  K1 = K1Temp;
  K2 = K2Temp;
  Fcfast = FcfastTemp;
  Jt = JtTemp;
  Jpe = JpeTemp;
  PEFactor = PEFactorTemp;
};

AnyMuscleModel3E Anconeus_2 = {
  AnyVar Volume= 0.5*8.00000/10^6; //m^3 mayo k2_2
  AnyVar MuscleBellyLength = 0.50; //m mayo k2_2 guesstimate from other subject
  AnyVar PCSA= Volume/(MuscleBellyLength*cos(Gammabar));

  F0 = .StrengthScaleUlna*PCSA*.ConstParam.MusStressForearm;
  AnyVar  LfbarTemp = 0.024000;//mm mayo k2_2
  __Lf_PARAM_ID = LfbarTemp;
  AnyVar Lt0Temp = 0.25*LfbarTemp;

  Lt0 = Lt0Temp;
  __Gamma_PARAM_ID = GammabarTemp;
  __Epsilon_PARAM_ID = EpsilonbarTemp;
  K1 = K1Temp;
  K2 = K2Temp;
  Fcfast = FcfastTemp;
  Jt = JtTemp;
  Jpe = JpeTemp;
  PEFactor = PEFactorTemp;
};

AnyMuscleModel3E Pronator_teres_caput_humeral_1 = {
  AnyVar Volume= 0.5*31.5/10^6; //m^3 mayo k2_2
  AnyVar MuscleBellyLength = 0.175; //m mayo k2_2 guesstimate from other subject
  AnyVar PCSA= Volume/(MuscleBellyLength*cos(Gammabar));

  F0 = .StrengthScaleUlna*PCSA*.ConstParam.MusStressForearm;
  AnyVar LfbarTemp = 0.066500;//mm mayo k2_2
  __Lf_PARAM_ID = LfbarTemp;
  AnyVar Lt0Temp = 0.15*LfbarTemp;

  Lt0 = Lt0Temp;
  __Gamma_PARAM_ID = GammabarTemp;
  __Epsilon_PARAM_ID = EpsilonbarTemp;
  K1 = K1Temp;
  K2 = K2Temp;
  Fcfast = FcfastTemp;
  Jt = JtTemp;
  Jpe = JpeTemp;
  PEFactor = PEFactorTemp;
};

AnyMuscleModel3E Pronator_teres_caput_humeral_2 = {
  AnyVar Volume= 0.5*31.5/10^6; //m^3 mayo k2_2
  AnyVar MuscleBellyLength = 0.175; //m mayo k2_2 guesstimate from other subject
  AnyVar PCSA= Volume/(MuscleBellyLength*cos(Gammabar));

  F0 = .StrengthScaleUlna*PCSA*.ConstParam.MusStressForearm;
  AnyVar  LfbarTemp = 0.066500;//mm mayo k2_2
  AnyVar Lt0Temp = 0.15*LfbarTemp;

  __Lf_PARAM_ID = LfbarTemp;
  Lt0 = Lt0Temp;
  __Gamma_PARAM_ID = GammabarTemp;
  __Epsilon_PARAM_ID = EpsilonbarTemp;
  K1 = K1Temp;
  K2 = K2Temp;
  Fcfast = FcfastTemp;
  Jt = JtTemp;
  Jpe = JpeTemp;
  PEFactor = PEFactorTemp;
};

AnyMuscleModel3E Pronator_teres_caput_ulnare_1 = {
  AnyVar Volume= 31.5/10^6; //m^3 mayo k2_2
  AnyVar MuscleBellyLength = 0.175; //m mayo k2_2 guesstimate from other subject
  AnyVar PCSA= Volume/(MuscleBellyLength*cos(Gammabar));

  F0 = .StrengthScaleUlna*PCSA*.ConstParam.MusStressForearm;
  AnyVar  LfbarTemp = 0.066500;//mm mayo k2_2
  __Lf_PARAM_ID = LfbarTemp;
  AnyVar Lt0Temp = 0.15*LfbarTemp;

  Lt0 = Lt0Temp;
  __Gamma_PARAM_ID = GammabarTemp;
  __Epsilon_PARAM_ID = EpsilonbarTemp;
  K1 = K1Temp;
  K2 = K2Temp;
  Fcfast = FcfastTemp;
  Jt = JtTemp;
  Jpe = JpeTemp;
  PEFactor = PEFactorTemp;
};

AnyMuscleModel3E Supinator_humerus_part_1 = {
  AnyVar Volume= 0.5*23/10^6; //m^3 mayo k2_2
  AnyVar MuscleBellyLength = 0.040; //m mayo k2_2
  AnyVar PCSA= Volume/(MuscleBellyLength*cos(Gammabar));

  F0 = .StrengthScaleUlna*PCSA*.ConstParam.MusStressForearm;
  AnyVar  LfbarTemp = 0.040000;//mm mayo k2_2
  __Lf_PARAM_ID = LfbarTemp;
  AnyVar Lt0Temp = 0.15*LfbarTemp;
  Lt0 = Lt0Temp;
  __Gamma_PARAM_ID = GammabarTemp;
  __Epsilon_PARAM_ID = EpsilonbarTemp;
  K1 = K1Temp;
  K2 = K2Temp;
  Fcfast = FcfastTemp;
  Jt = JtTemp;
  Jpe = JpeTemp;
  PEFactor = PEFactorTemp;
};

AnyMuscleModel3E Supinator_humerus_part_2 = {
  AnyVar Volume= 0.5*23/10^6; //m^3 mayo k2_2
  AnyVar MuscleBellyLength = 0.040; //m mayo k2_2
  AnyVar PCSA= Volume/(MuscleBellyLength*cos(Gammabar));

  F0 = .StrengthScaleUlna*PCSA*.ConstParam.MusStressForearm;
  AnyVar  LfbarTemp = 0.040000;//mm mayo k2_2
  __Lf_PARAM_ID = LfbarTemp;
  AnyVar Lt0Temp = 0.15*LfbarTemp;
  Lt0 = Lt0Temp;
  __Gamma_PARAM_ID = GammabarTemp;
  __Epsilon_PARAM_ID = EpsilonbarTemp;
  K1 = K1Temp;
  K2 = K2Temp;
  Fcfast = FcfastTemp;
  Jt = JtTemp;
  Jpe = JpeTemp;
  PEFactor = PEFactorTemp;
};

AnyMuscleModel3E Supinator_ulna_part_1 = {
  AnyVar Volume= 0.5*23/10^6; //m^3 mayo k2_2
  AnyVar MuscleBellyLength = 0.040; //m mayo k2_2
  AnyVar PCSA= Volume/(MuscleBellyLength*cos(Gammabar));

  F0 = .StrengthScaleUlna*PCSA*.ConstParam.MusStressForearm;
  __Lf_PARAM_ID = LfbarTemp;
  AnyVar LfbarTemp = 0.040000;//mm mayo k2_2
  Lt0 = Lt0Temp;
  AnyVar Lt0Temp = 0.15*LfbarTemp;

  __Gamma_PARAM_ID = GammabarTemp;
  __Epsilon_PARAM_ID = EpsilonbarTemp;
  K1 = K1Temp;
  K2 = K2Temp;
  Fcfast = FcfastTemp;
  Jt = JtTemp;
  Jpe = JpeTemp;
  PEFactor = PEFactorTemp;
};

AnyMuscleModel3E Supinator_ulna_part_2 = {
  AnyVar Volume= 0.5*23/10^6; //m^3 mayo k2_2
  AnyVar MuscleBellyLength = 0.040; //m mayo k2_2
  AnyVar PCSA= Volume/(MuscleBellyLength*cos(Gammabar));

  F0 = .StrengthScaleUlna*PCSA*.ConstParam.MusStressForearm;
  __Lf_PARAM_ID = LfbarTemp;
  AnyVar LfbarTemp = 0.040000;//mm mayo k2_2
  Lt0 = Lt0Temp;
  AnyVar Lt0Temp = 0.15*LfbarTemp;
  __Gamma_PARAM_ID = GammabarTemp;
  __Epsilon_PARAM_ID = EpsilonbarTemp;
  K1 = K1Temp;
  K2 = K2Temp;
  Fcfast = FcfastTemp;
  Jt = JtTemp;
  Jpe = JpeTemp;
  PEFactor = PEFactorTemp;
};

AnyMuscleModel3E Pron_quadr_1 = {
  AnyVar Volume= 0.5*8.5/10^6; //m^3 mayo k2_2
  AnyVar MuscleBellyLength = 0.040; //m mayo k2_2 guesstimate from other subject
  AnyVar PCSA= Volume/(MuscleBellyLength*cos(Gammabar));

  F0 = .StrengthScaleUlna*PCSA*.ConstParam.MusStressForearm;
  __Lf_PARAM_ID = LfbarTemp;
  AnyVar LfbarTemp = 0.02000;
  AnyVar Lt0Temp = 0.01*LfbarTemp;
  Lt0 = Lt0Temp;
  __Gamma_PARAM_ID = GammabarTemp;
  __Epsilon_PARAM_ID = EpsilonbarTemp;
  K1 = K1Temp;
  K2 = K2Temp;
  Fcfast = FcfastTemp;
  Jt = JtTemp;
  Jpe = JpeTemp;
  PEFactor = PEFactorTemp;
};

AnyMuscleModel3E Pron_quadr_2 = {
  AnyVar Volume= 0.5*8.5/10^6; //m^3 mayo k2_2
  AnyVar MuscleBellyLength = 0.040; //m mayo k2_2 guesstimate from other subject
  AnyVar PCSA= Volume/(MuscleBellyLength*cos(Gammabar));

  F0 = .StrengthScaleUlna*PCSA*.ConstParam.MusStressForearm;
  __Lf_PARAM_ID = LfbarTemp;
  AnyVar LfbarTemp = 0.02000;
  AnyVar Lt0Temp = 0.01*LfbarTemp;

  Lt0 = Lt0Temp;
  __Gamma_PARAM_ID = GammabarTemp;
  __Epsilon_PARAM_ID = EpsilonbarTemp;
  K1 = K1Temp;
  K2 = K2Temp;
  Fcfast = FcfastTemp;
  Jt = JtTemp;
  Jpe = JpeTemp;
  PEFactor = PEFactorTemp;
};


AnyMuscleModel3E Extensor_Pollicis_Longus = {
  AnyVar PCSA = 90.00000; // mm^2 Lieber1
  F0 = .StrengthScaleUlna*PCSA*.ConstParam.MusStress;
  __Lf_PARAM_ID = 0.05500;
  Lt0 = 0.194;
  __Gamma_PARAM_ID = 7*(pi/180);
  __Epsilon_PARAM_ID = EpsilonbarTemp;
  K1 = K1Temp;
  K2 = K2Temp;
  Fcfast = FcfastTemp;
  Jt = JtTemp;
  Jpe = JpeTemp;
  PEFactor = PEFactorTemp;
};

AnyMuscleModel3E  Extensor_Pollicis_Brevis = {
  AnyVar PCSA = 30.00000; // mm^2 Lieber1
  F0 =  .StrengthScaleUlna*PCSA*.ConstParam.MusStress;
  __Lf_PARAM_ID = 0.068;
  Lt0 = 0.115;
  __Gamma_PARAM_ID = 7*(pi/180);
  __Epsilon_PARAM_ID = EpsilonbarTemp;
  K1 = K1Temp;
  K2 = K2Temp;
  Fcfast = FcfastTemp;
  Jt = JtTemp;
  Jpe = JpeTemp;
  PEFactor = PEFactorTemp;
};

AnyMuscleModel3E Abductor_Pollicis_Longus = {
  AnyVar PCSA = 130.000; // mm^2 Liber1
  F0 =  .StrengthScaleUlna*PCSA*.ConstParam.MusStress;
  __Lf_PARAM_ID = 0.05400;
  Lt0 = 0.221;
  __Gamma_PARAM_ID = 6*(pi/180);
  __Epsilon_PARAM_ID = EpsilonbarTemp;
  K1 = K1Temp;
  K2 = K2Temp;
  Fcfast = FcfastTemp;
  Jt = JtTemp;
  Jpe = JpeTemp;
  PEFactor = PEFactorTemp;
};


AnyMuscleModel3E Extensor_Indicis = {
  AnyVar PCSA = 50.0000; // mm^2 Liber1
  F0 =  .StrengthScaleUlna*PCSA*.ConstParam.MusStress;
  __Lf_PARAM_ID = 0.05900;
  Lt0 = 0.186;
  __Gamma_PARAM_ID = 6*(pi/180);
  __Epsilon_PARAM_ID = EpsilonbarTemp;
  K1 = K1Temp;
  K2 = K2Temp;
  Fcfast = FcfastTemp;
  Jt = JtTemp;
  Jpe = JpeTemp;
  PEFactor = PEFactorTemp;
};

AnyMuscleModel3E Extensor_Carpi_Ulnaris = {
  AnyVar PCSA = 210.0000; // mm^2 Lieber2
  F0 = .StrengthScaleUlna*PCSA*.ConstParam.MusStress;
  __Lf_PARAM_ID = 0.051;
  Lt0 = 0.265;
  __Gamma_PARAM_ID = 12*(pi/180);
  __Epsilon_PARAM_ID = EpsilonbarTemp;
  K1 = K1Temp;
  K2 = K2Temp;
  Fcfast = FcfastTemp;
  Jt = JtTemp;
  Jpe = JpeTemp;
  PEFactor = PEFactorTemp;
};


AnyMuscleModel3E Extensor_Carpi_Radialis_Longus = {
  AnyVar PCSA = 220.000; // mm^2 Murray
  F0 = .StrengthScaleUlna*PCSA*.ConstParam.MusStress;
  __Lf_PARAM_ID = 0.081;
  Lt0 = 0.224;
  __Gamma_PARAM_ID = 0*(pi/180);
  __Epsilon_PARAM_ID = EpsilonbarTemp;
  K1 = K1Temp;
  K2 = K2Temp;
  Fcfast = FcfastTemp;
  Jt = JtTemp;
  Jpe = JpeTemp;
  PEFactor = PEFactorTemp;
};


AnyMuscleModel3E Extensor_Carpi_Radialis_Brevis = {
  AnyVar PCSA = 220; // mm^2 Murray
  F0 = .StrengthScaleUlna*PCSA*.ConstParam.MusStress;
  __Lf_PARAM_ID = 0.059;
  Lt0 = 0.222;
  __Gamma_PARAM_ID = 0*(pi/180);
  __Epsilon_PARAM_ID = EpsilonbarTemp;
  K1 = K1Temp;
  K2 = K2Temp;
  Fcfast = FcfastTemp;
  Jt = JtTemp;
  Jpe = JpeTemp;
  PEFactor = PEFactorTemp;
};


AnyMuscleModel3E Flexor_Carpi_Radialis = {
  AnyVar PCSA = 160; //mm^2 Lieber1
  F0 = .StrengthScaleUlna*PCSA*.ConstParam.MusStress;
  __Lf_PARAM_ID = 0.063;
  Lt0 = 0.244;
  __Gamma_PARAM_ID = 3*(pi/180);
  __Epsilon_PARAM_ID = EpsilonbarTemp;
  K1 = K1Temp;
  K2 = K2Temp;
  Fcfast = FcfastTemp;
  Jt = JtTemp;
  Jpe = JpeTemp;
  PEFactor = PEFactorTemp;
};

AnyMuscleModel3E Flexor_Carpi_Ulnaris = {
  AnyVar PCSA = 290; //mm^2 Lieber1
  F0 = .StrengthScaleUlna*PCSA*.ConstParam.MusStress;
  __Lf_PARAM_ID = 0.051;
  Lt0 = 0.265;
  __Gamma_PARAM_ID = 12*(pi/180);
  __Epsilon_PARAM_ID = EpsilonbarTemp;
  K1 = K1Temp;
  K2 = K2Temp;
  Fcfast = FcfastTemp;
  Jt = JtTemp;
  Jpe = JpeTemp;
  PEFactor = PEFactorTemp;
};


AnyMuscleModel3E Palmaris_Longus = {
  AnyVar PCSA = 60; //mm^2 Lieber2
  F0 = .StrengthScaleUlna*PCSA*.ConstParam.MusStress;
  __Lf_PARAM_ID = 0.064;
  Lt0 = 0.269;
  __Gamma_PARAM_ID = 4*(pi/180);
  __Epsilon_PARAM_ID = EpsilonbarTemp;
  K1 = K1Temp;
  K2 = K2Temp;
  Fcfast = FcfastTemp;
  Jt = JtTemp;
  Jpe = JpeTemp;
  PEFactor = PEFactorTemp;
};


AnyMuscleModel3E Flexor_Digitorum_Superficialis_Digit5 = {
  AnyVar PCSA = 40; //mm^2 Lieber 2
  F0 = .StrengthScaleUlna*PCSA*.ConstParam.MusStress;
  __Lf_PARAM_ID = 0.052;
  Lt0 = 0.338;
  __Gamma_PARAM_ID = 5*(pi/180);
  __Epsilon_PARAM_ID = EpsilonbarTemp;
  K1 = K1Temp;
  K2 = K2Temp;
  Fcfast = FcfastTemp;
  Jt = JtTemp;
  Jpe = JpeTemp;
  PEFactor = PEFactorTemp;
};

AnyMuscleModel3E Flexor_Digitorum_Superficialis_Digit4 = {
  AnyVar PCSA = 130; //mm^2 Lieber 2
  F0 = .StrengthScaleUlna*PCSA*.ConstParam.MusStress;
  __Lf_PARAM_ID = 0.074;
  Lt0 = 0.328;
  __Gamma_PARAM_ID = 4*(pi/180);
  __Epsilon_PARAM_ID = EpsilonbarTemp;
  K1 = K1Temp;
  K2 = K2Temp;
  Fcfast = FcfastTemp;
  Jt = JtTemp;
  Jpe = JpeTemp;
  PEFactor = PEFactorTemp;
};


AnyMuscleModel3E Flexor_Digitorum_Superficialis_Digit3 = {
  AnyVar PCSA = 200; //mm^2 Lieber 2
  F0 = .StrengthScaleUlna*PCSA*.ConstParam.MusStress;
  __Lf_PARAM_ID = 0.075;
  Lt0 = 0.295;
  __Gamma_PARAM_ID = 7*(pi/180);
  __Epsilon_PARAM_ID = EpsilonbarTemp;
  K1 = K1Temp;
  K2 = K2Temp;
  Fcfast = FcfastTemp;
  Jt = JtTemp;
  Jpe = JpeTemp;
  PEFactor = PEFactorTemp;
};

AnyMuscleModel3E Flexor_Digitorum_Superficialis_Digit2 = {
  AnyVar PCSA = 140; //mm^2 Lieber 2
  F0 = .StrengthScaleUlna*PCSA*.ConstParam.MusStress;
  __Lf_PARAM_ID = 0.084;
  Lt0 = 0.275;
  __Gamma_PARAM_ID = 6*(pi/180);
  __Epsilon_PARAM_ID = EpsilonbarTemp;
  K1 = K1Temp;
  K2 = K2Temp;
  Fcfast = FcfastTemp;
  Jt = JtTemp;
  Jpe = JpeTemp;
  PEFactor = PEFactorTemp;
};


AnyMuscleModel3E Flexor_Digitorum_Profundus_Digit5 = {
  AnyVar PCSA = 180; //mm^2 Lieber 2
  F0 = .StrengthScaleUlna*PCSA*.ConstParam.MusStress;
  __Lf_PARAM_ID = 0.075;
  Lt0 = 0.282;
  __Gamma_PARAM_ID = 8*(pi/180);
  __Epsilon_PARAM_ID = EpsilonbarTemp;
  K1 = K1Temp;
  K2 = K2Temp;
  Fcfast = FcfastTemp;
  Jt = JtTemp;
  Jpe = JpeTemp;
  PEFactor = PEFactorTemp;
};


AnyMuscleModel3E Flexor_Digitorum_Profundus_Digit4 = {
  AnyVar PCSA = 140; //mm^2 Lieber 2
  F0 = .StrengthScaleUlna*PCSA*.ConstParam.MusStress;
  __Lf_PARAM_ID = 0.08;
  Lt0 = 0.282;
  __Gamma_PARAM_ID = 7*(pi/180);
  __Epsilon_PARAM_ID = EpsilonbarTemp;
  K1 = K1Temp;
  K2 = K2Temp;
  Fcfast = FcfastTemp;
  Jt = JtTemp;
  Jpe = JpeTemp;
  PEFactor = PEFactorTemp;
};

AnyMuscleModel3E Flexor_Digitorum_Profundus_Digit3 = {
  AnyVar PCSA = 180; //mm^2 Lieber 2
  F0 = .StrengthScaleUlna*PCSA*.ConstParam.MusStress;
  __Lf_PARAM_ID = 0.084;
  Lt0 = 0.293;
  __Gamma_PARAM_ID = 6*(pi/180);
  __Epsilon_PARAM_ID = EpsilonbarTemp;
  K1 = K1Temp;
  K2 = K2Temp;
  Fcfast = FcfastTemp;
  Jt = JtTemp;
  Jpe = JpeTemp;
  PEFactor = PEFactorTemp;
};

AnyMuscleModel3E Flexor_Digitorum_Profundus_Digit2 = {
  AnyVar PCSA = 150; //mm^2 Lieber 2
  F0 = .StrengthScaleUlna*PCSA*.ConstParam.MusStress;
  __Lf_PARAM_ID = 0.075;
  Lt0 = 0.294;
  __Gamma_PARAM_ID = 2*(pi/180);
  __Epsilon_PARAM_ID = EpsilonbarTemp;
  K1 = K1Temp;
  K2 = K2Temp;
  Fcfast = FcfastTemp;
  Jt = JtTemp;
  Jpe = JpeTemp;
  PEFactor = PEFactorTemp;
};


AnyMuscleModel3E Extensor_Digitorum_Digit5 = {
  AnyVar PCSA = 30; //mm^2 Lieber 2
  F0 = .StrengthScaleUlna*PCSA*.ConstParam.MusStress;
  __Lf_PARAM_ID = 0.065;
  Lt0 = 0.297;
  __Gamma_PARAM_ID = 2*(pi/180);
  __Epsilon_PARAM_ID = EpsilonbarTemp;
  K1 = K1Temp;
  K2 = K2Temp;
  Fcfast = FcfastTemp;
  Jt = JtTemp;
  Jpe = JpeTemp;
  PEFactor = PEFactorTemp;
};

AnyMuscleModel3E Extensor_Digitorum_Digit4 = {
  AnyVar PCSA = 80; //mm^2 Lieber 2
  F0 = .StrengthScaleUlna*PCSA*.ConstParam.MusStress;
  __Lf_PARAM_ID = 0.063;
  Lt0 = 0.327;
  __Gamma_PARAM_ID = 3*(pi/180);
  __Epsilon_PARAM_ID = EpsilonbarTemp;
  K1 = K1Temp;
  K2 = K2Temp;
  Fcfast = FcfastTemp;
  Jt = JtTemp;
  Jpe = JpeTemp;
  PEFactor = PEFactorTemp;
};


AnyMuscleModel3E Extensor_Digitorum_Digit3 = {
  AnyVar PCSA = 80; //mm^2 Lieber 2
  F0 = .StrengthScaleUlna*PCSA*.ConstParam.MusStress;
  __Lf_PARAM_ID = 0.072;
  Lt0 = 0.335;
  __Gamma_PARAM_ID = 3*(pi/180);
  __Epsilon_PARAM_ID = EpsilonbarTemp;
  K1 = K1Temp;
  K2 = K2Temp;
  Fcfast = FcfastTemp;
  Jt = JtTemp;
  Jpe = JpeTemp;
  PEFactor = PEFactorTemp;
};

AnyMuscleModel3E Extensor_Digitorum_Digit2 = {
  AnyVar PCSA = 40; //mm^2 Lieber 2
  F0 = .StrengthScaleUlna*PCSA*.ConstParam.MusStress;
  __Lf_PARAM_ID = 0.07;
  Lt0 = 0.325;
  __Gamma_PARAM_ID = 3*(pi/180);
  __Epsilon_PARAM_ID = EpsilonbarTemp;
  K1 = K1Temp;
  K2 = K2Temp;
  Fcfast = FcfastTemp;
  Jt = JtTemp;
  Jpe = JpeTemp;
  PEFactor = PEFactorTemp;
};

AnyMuscleModel3E Extensor_Digiti_Minimi = {
  AnyVar PCSA = 60; //mm^2 Lieber 2
  F0 = .StrengthScaleUlna*PCSA*.ConstParam.MusStress;
  __Lf_PARAM_ID = 0.068;
  Lt0 = 0.322;
  __Gamma_PARAM_ID = 3*(pi/180);
  __Epsilon_PARAM_ID = EpsilonbarTemp;
  K1 = K1Temp;
  K2 = K2Temp;
  Fcfast = FcfastTemp;
  Jt = JtTemp;
  Jpe = JpeTemp;
  PEFactor = PEFactorTemp;
};

AnyMuscleModel3E Flexor_Pollicis_Longus = {
  AnyVar PCSA = 170; //mm^2 Lieber 2
  F0 = .StrengthScaleUlna*PCSA*.ConstParam.MusStress;
  __Lf_PARAM_ID = 0.055;
  Lt0 = 0.194;
  __Gamma_PARAM_ID = 7*(pi/180);
  __Epsilon_PARAM_ID = EpsilonbarTemp;
  K1 = K1Temp;
  K2 = K2Temp;
  Fcfast = FcfastTemp;
  Jt = JtTemp;
  Jpe = JpeTemp;
  PEFactor = PEFactorTemp;
};
