// This file contains segment inertia properties and geometry used for muscle wrapping.
// The file includes a number of segment files which contains muscles attachment points and
// bonylandmarks.

///Clavicula segment definition
AnySeg Clavicula ={

  AnyMat33 Mirror={{1,0,0},{0,..Sign*1,0},{0,0,1}};

  AnyFunTransform3D &Scale=..Scaling.GeometricalScaling.Clavicula.ScaleFunction;

  //-->Temp
  AnyRefNode ScalingNode = {};
  //<--Temp

  AnyKinLinear Lin ={
    Ref=0;
    AnyRefNode &ref1=.scj;
    AnySeg &ref2=.....Trunk.SegmentsThorax.ThoraxSeg;
  };

  //  used before
  AnyRefNode NeutralPositionOnPelvis = {
    AnyVec3 StandardsRel ={-0.06475022, -0.4240306, -0.05013008};
    // AnyVec3 StandardsRel ={-0.000708, -0.431345, -0.021187};
    sRel=(.Scale(StandardsRel))*.Mirror;


    AnyMat33 Clavicula_Axes = {
      {-0.4035009, ...Sign*0.2703461, -0.8741282},
      {0.1493913, ...Sign*0.9619986, 0.2285626},
      {...Sign*0.9027011, -0.0383619,...Sign* -0.4285547}};

    AnyMat33 Pelvis_Axes = {{1.000000, 0.000000, 0.000000}, {0.000000, 1.000000, 0.000000}, {0.000000, 0.000000, 1.000000}};
    ARel=Clavicula_Axes'*Pelvis_Axes;
  };

  AnyMat33  As= ....Trunk.SegmentsThorax.ThoraxSeg.Axes0*NeutralPositionOnPelvis.ARel';
  AnyVec3   RThorax = ....Trunk.SegmentsThorax.ThoraxSeg.r0;

  AnyVec3 Rvec=(RThorax-NeutralPositionOnPelvis.sRel*As');
  r0={Rvec[0],Rvec[1],Rvec[2]};

  Axes0={
    {As[0][0],As[0][1],As[0][2]},
    {As[1][0],As[1][1],As[1][2]},
    {As[2][0],As[2][1],As[2][2]}};


  /*
  AnyRefNode NeutralPositionOnPelvis = {
  AnyVec3 StandardsRel ={-0.000708, -0.431345, -0.021187};
  sRel=.Scale(StandardsRel);
  AnyMat33 Clavicula_Axes = {
  {-0.280836, 0.188095, -0.941144},
  {-0.004752, 0.980323, 0.197343},
  { 0.959744, 0.059893, -0.274416}};

  AnyMat33 Pelvis_Axes = {{1.000000, 0.000000, 0.000000}, {0.000000, 1.000000, 0.000000}, {0.000000, 0.000000, 1.000000}};
  ARel=Clavicula_Axes'*Pelvis_Axes;
  };

  AnyMat33  As= ....Trunk.SegmentsThorax.ThoraxSeg.Axes0*NeutralPositionOnPelvis.ARel';
  AnyVec3   RThorax = ....Trunk.SegmentsThorax.ThoraxSeg.r0;

  AnyVec3 Rvec=(RThorax-NeutralPositionOnPelvis.sRel*As');
  r0={Rvec[0],Rvec[1],..Sign*Rvec[2]};

  Axes0={
  {As[0][0],..Sign*As[0][1],As[0][2]},
  {As[1][0],..Sign*As[1][1],As[1][2]},
  {..Sign*As[2][0],As[2][1],..Sign*As[2][2]}};
  */

//  #include "../DrawSettings/Nodes.any"

  AnyVar MassS = .....Scaling.MassScaling.Clavicula.MassScale;
  AnyVar MassStandard = ..StandardParameters.Clavicula.Mass;
  Mass = MassS*MassStandard;

  //AnyVar LengthStandard = 0.168874;
  //Note stc issue for scaling
  AnyVar Length = ( (ac.sRel[0]-scj.sRel[0])^2 + (ac.sRel[1]-scj.sRel[1])^2 + (ac.sRel[2]-scj.sRel[2])^2 )^0.5; // Find the length using bonylandmark x coordinates!
  AnyVar Radius = (Mass/(3.1416*Length*..StandardParameters.Clavicula.Density))^0.5;
  AnyVar Iyy = 0.25*Mass*Radius*Radius + 1/12*Mass*Length*Length;
  AnyVar Ixx = 0.5*Mass*Radius*Radius;
  AnyVar Izz = Iyy;
  Jii = {Ixx,Iyy,Izz};
  sCoM={Length/2,0,0}; // Guesstimate
  JaboutCoMOnOff = On;

  AnyRefNode ac = {
    sRel = .Scale({0.168874, -0.000000, -0.000000})*.Mirror;
  };

  AnyRefNode acj = {
    sRel = .Scale({0.155254, 0.002989,-0.006589})*.Mirror;
    #include "../DrawSettings/JointAxesDistal.any"

  };

  AnyRefNode scj = {
    sRel = .Scale({0.000000, 0.000000, 0.000000})*.Mirror;
    #include "../DrawSettings/JointAxesProximal.any"

  };
  AnyVec3 ConoidStd={0.127105, 0.006526 , 0.002547};

  AnyRefNode conoid = {
    sRel = .Scale(.ConoidStd)*.Mirror;
  };

  AnyRefNode trapezoid = {
    sRel = .Scale({0.139417, 0.004248, -0.006785})*.Mirror;
  };


  AnyDrawSurf DrwSurf2 = {
    FileName = "Clavicula_bone";
    RGB=...ColorRef.Segments;
    ScaleXYZ =  ({1,1*...Sign,1});
    AnyFunTransform3D &Scale = .Scale;
    Opacity = ...BonesOpacity.Clavicula;
  };
};

//************************************************************************************
//Scapula segment definition
AnySeg Scapula ={

  AnyMat33 Mirror={{1,0,0},{0,1*..Sign,0},{0,0,1}};

  //AnyDrawRefFrame DRW={ScaleXYZ={1,1,1};};
  AnyFunTransform3D &Scale=..Scaling.GeometricalScaling.Scapula.ScaleFunction;
  #if scale ==1
    AnyFunTransform3D &Scale1=..Scaling.GeometricalScaling.Scapula.ScaleFunction1;
  #endif

  //-->Temp
  AnyRefNode AnatomicalFrame = {};
  AnyRefNode& ScalingNode = AnatomicalFrame;
  AnyFunTransform3D& GeomScale = Scale;
  //<--Temp

  /*
  AnyFolder NeutralPositionOnPelvis = {
  AnyVec3 StandardsRel = {-0.230118, -0.394883, -0.075449};
  AnyVec3 sRel = .Scale( StandardsRel);
  AnyMat33 Scapula_Axes = {
  {0.588988, -0.159489, -0.792248},
  {0.186879, 0.980641, -0.058482},
  {0.786238, -0.113609, 0.607391}};

  AnyMat33 Pelvis_Axes  = {{1.000000, 0.000000, 0.000000}, {0.000000, 1.000000, 0.000000}, {0.000000, 0.000000, 1.000000}};
  AnyMat33 ARel=Scapula_Axes'*Pelvis_Axes;

  };

  AnyMat33  As= ....Trunk.SegmentsThorax.ThoraxSeg.Axes0*NeutralPositionOnPelvis.ARel';
  AnyVec3   RThorax = ....Trunk.SegmentsThorax.ThoraxSeg.r0;

  AnyVec3 Rvec=(RThorax-NeutralPositionOnPelvis.sRel*As');

  r0={Rvec[0],Rvec[1],..Sign*Rvec[2]};

  Axes0=
  {{As[0][0],..Sign*As[0][1],As[0][2]},
  {As[1][0],..Sign*As[1][1],As[1][2]},
  {..Sign*As[2][0],As[2][1],..Sign*As[2][2]}};

  */

  AnyKinLinear Lin ={
    Ref=0;
    AnyRefNode &ref1=.ac;
    AnySeg &ref2=.....Trunk.SegmentsThorax.ThoraxSeg;
  };


  AnyRefNode NeutralPositionOnPelvis = {


    AnyVec3 StandardsRel=  {-0.2914858, -0.3801103, -0.07873066};
    //AnyVec3 StandardsRel =  {-0.218944, -0.399176, -0.087378};
    sRel = .Scale( StandardsRel)*.Mirror;

    AnyMat33 Scapula_Axes = {
      {0.270262, ...Sign*-0.1210351, -0.9551487},
      {0.3376548, ...Sign*0.9409716, -0.0236982},
      {...Sign*0.9016361, -0.3161058, ...Sign*0.2951769}};

    AnyMat33 Pelvis_Axes  = {
      {1.000000, 0.000000, 0.000000},
      {0.000000, 1.000000, 0.000000},
      {0.000000, 0.000000, 1.000000}};

    ARel=Scapula_Axes'*Pelvis_Axes;


  };

  AnyMat33  As= ....Trunk.SegmentsThorax.ThoraxSeg.Axes0*NeutralPositionOnPelvis.ARel';
  AnyVec3   RThorax = ....Trunk.SegmentsThorax.ThoraxSeg.r0;

  AnyVec3 Rvec=(RThorax-NeutralPositionOnPelvis.sRel*As');

  r0={Rvec[0],Rvec[1],Rvec[2]};

  Axes0=
  {{As[0][0],As[0][1],As[0][2]},
    {As[1][0],As[1][1],As[1][2]},
    {As[2][0],As[2][1],As[2][2]}};


//  AnyDrawRefFrame drw={
//    ScaleXYZ={1,1,1}*0.06;
//    RGB={.75,.75,.75};
//  };


//  #include "../DrawSettings/Nodes.any"
//  #include "../DrawSettings/NodesScapula.any"
  #include "../DrawSettings/SegmentAxes.any"

  AnyVar MassS = .....Scaling.MassScaling.Scapula.MassScale;
  AnyVar MassStandard = ..StandardParameters.Scapula.Mass;
  Mass = MassS*MassStandard;

  AnyVar Length = 0.01; // Guesstimate the thickness.

  //Note stc issue for scaling
  AnyVar Radius = (Mass/(3.1416*Length*..StandardParameters.Scapula.Density))^0.5;
  AnyVar Iyy = 0.25*Mass*Radius*Radius + 1/12*Mass*Length*Length;
  AnyVar Izz = 0.5*Mass*Radius*Radius;
  AnyVar Ixx = Iyy;
  Jii = {Ixx,Iyy,Izz};
  sCoM={-0.06,-0.04,0.02}*Mirror;
  JaboutCoMOnOff = On;
//
//
  #if scale ==0
    AnyDrawSurf DrwSurf = {
      FileName = "Scapula_new";
      RGB=...ColorRef.Segments;
      ScaleXYZ = {1.0,1.0,1.0}*.Mirror;
      Opacity = ...BonesOpacity.Scapula;
    };

  #else
    #if dev==1
      #if scale ==1
        AnyDrawSurf DrwSurfSource = {
          FileName = "..\..\STL Models\Scapula\SourceScapula";
          RGB=  ...ColorRef.Segments; //{0,0,1};
          ScaleXYZ = {1.0,1.0,1.0}*.Mirror;
          Opacity =...BonesOpacity.Scapula; //0.4;  //
        };
        AnyDrawSurf DrwSurfMorphed = {
          FileName = "..\..\STL Models\Scapula\SourceScapula";
          RGB={0,0,1};
          ScaleXYZ = {1.0,1.0,1.0}*.Mirror;
          AnyFunTransform3D &Scale = .Scale1;
          Opacity = ...BonesOpacity.Scapula;
        };
        AnyDrawSurf DrwSurfTarget= {
          FileName = "..\..\STL Models\Scapula\TargetScapula";
          RGB={0,1,0};
          ScaleXYZ = {1.0,1.0,1.0}*.Mirror;
          Opacity = 1;//0.5;
        };
      #endif
    #endif

    AnyDrawSurf DrwSurfRes = {
      FileName = "..\..\STLModels\Scapula\SourceScapula";
      RGB=...ColorRef.Segments; //{1,0,0};
      ScaleXYZ = {1.0,1.0,1.0}*.Mirror;
      AnyFunTransform3D &Scale = .Scale;
      Opacity = ...BonesOpacity.Scapula;
    };

  #endif

  //-----------------------
  // Glenoid implant
  AnyFolder &Param = Main.InputVariables.ImplantParameters;
  AnyRefNode GlenImplantPos = {
    sRel = .Param.GlenPosition.Position;
    ARel = .Param.GlenPosition.Rotation;

    AnySurfSTL GleneSTL = {
      FileName = "../../../Body/STLModels/ImplantModels/" + ..Param.ImplantNames.GlenoidName+ ".stl";
      ScaleXYZ = {1,1,1}*0.001;
      AnyDrawSurf drw = {
        FileName = .FileName;
        RGB = {1,0.2,0};
        ScaleXYZ = {1,1,1}*0.001;
      };
    };
  };

  // End glenoid implant
  //-----------------------


  // Points anatomiques d'interet
  AnyRefNode MuscleConnectorPlaneNode ={
    sRel = .Scale({0.032144, -0.008524, -0.025-0.003283})*.Mirror;
  };

  AnyRefNode ac = {
    sRel = .Scale({0.000000, 0.000000, 0.000000})*.Mirror;
    #include "../DrawSettings/BML.any"
    #include "../DrawSettings/JointAxesProximal.any"
  };

  AnyRefNode acj = {
    sRel = .Scale({-0.000929+0.007, 0.001401-0.005, -0.015331-0.015})*.Mirror;
  };

  AnyRefNode ts = {
    sRel = .Scale({-0.117455, -0.017693, 0.006280})*.Mirror;
    #include "../DrawSettings/BML.any"
  };

  AnyRefNode ai= {
    sRel = .Scale({-0.130736, -0.130236, 0.006280})*.Mirror;
    #include "../DrawSettings/BML.any"
  };


  AnyRefNode aa = {
    sRel = .Scale({0.022522, -0.017693, 0.006280})*.Mirror;
    #include "../DrawSettings/BML.any"
  };

  AnyRefNode gh = {
    //Corrected!
    AnyVec3 d= {0.0075,0,-0.01};
    sRel = .Scale({0.015898, -0.050863, -0.024381}+d)*.Mirror;
//

//      AnyDrawRefFrame drw={
//        ScaleXYZ={1,1,1}*0.06;
//        RGB={0.5,0.5,1};
//      };

    // ----------
    // nvelle ref en gh, oriente selon les axes de la glene prothetique
    AnyRefNode ghProth = {
      ARel = ..Param.GlenPosition.Rotation ;

      #if Camera==0
        AnyDrawRefFrame drw={
          ScaleXYZ={1,1,1}*0.06;
          RGB={0.9,0.2,0.2};
        };
      #endif

      // Cam Position for glen view
      #if Vue==2
        AnyRefNode CamPos = {
          sRel = {0,0,0};  // (Ant, sup, lat)
           ARel = RotMat(-pi/5,y);
//          AnyDrawRefFrame drw={
//            ScaleXYZ={1,1,1}*0.06;
//            RGB={0,0.2,0.2};
//          };
  //
          AnyRefNode CamUp = {
            sRel = {0,0.2,0};
          };
        };
      #endif

      };
    // ----------

    //AnyDrawRefFrame drw={};
    #include "../DrawSettings/BML.any"
    #include "../DrawSettings/JointAxesDistal.any"

    };


  AnyVec3 ConoidStd={-0.030040, -0.008900, -0.035754};

  AnyRefNode conoid = {
    sRel = .Scale(.ConoidStd)*.Mirror;
//    AnyDrawNode DrawNode = {
//      RGB = {1, 1, 0};
//      ScaleXYZ = 0.002*{1,1,1};
//    };
    };

  AnyRefNode trapezoid = {
    sRel = .Scale({-0.020194, -0.009190 , -0.037291})*.Mirror;
  };


}; //Scapula


//************************************************************************************

//************************************************************************************
//Humerus segment definition
AnySeg Humerus ={
  AnyVec3 OffSet =-{-0.001379, 0.008999 , -0.009119};

  AnyMat33 Mirror={{..Sign,0,0},{0,1,0},{0,0,1}};

  r0=.Scapula.gh.sRel*.Scapula.Axes0'+.Scapula.r0;

  AnyFunTransform3D &Scale=..Scaling.GeometricalScaling.Humerus.ScaleFunction;
  #if scale ==1
    AnyFunTransform3D &Scale1=..Scaling.GeometricalScaling.Humerus.ScaleFunction1;
  #endif

//  #include "../DrawSettings/Nodes.any"

  AnyVar MassS = .....Scaling.MassScaling.Humerus.MassScale;
  AnyVar MassStandard = ..StandardParameters.Humerus.Mass;

  Mass = MassS*MassStandard;

  //Note stc issue for scaling
  AnyVar Length = ((gh.sRel[1]-fe.sRel[1])^2)^0.5; // Find the length using bonylandmark x coordinates!

  AnyVar Radius = (Mass/(3.1416*Length*..StandardParameters.Humerus.Density))^0.5;

  AnyVar Ixx = 0.25*Mass*Radius*Radius + 1/12*Mass*Length*Length;
  AnyVar Iyy = 0.5*Mass*Radius*Radius;
  AnyVar Izz = Ixx;
  Jii = {Ixx,Iyy,Izz};
  sCoM={0,-0.18*Length,0};
  JaboutCoMOnOff = On;

  //-->Temp
  AnyRefNode AnatomicalFrame = {};
  AnyRefNode& ScalingNode = AnatomicalFrame;
  AnyFunTransform3D& GeomScale = Scale;
  //<--Temp


//  AnyDrawRefFrame drw = {ScaleXYZ={1,1,1}*0.05;RGB={1,0,1};};

  // Modele osseux Humerus (remplace par humerus coupe)
  AnyRefNode HumerusBoneGeometryNode={
    sRel=.OffSet*.Mirror;


    // What if scale ==1 ?
    #if scale ==0 | scale==2
      #if Camera==0
        AnyDrawSurf DrwSurf = {
          FileName = "..\..\STLModels\Humerus\SourceHumerus";
          RGB =....ColorRef.Segments;
          Opacity = 0.7; // ....BonesOpacity.Humerus;
        };
      #endif
    #endif

  //-----------------------
  // Humeral  implant
  AnyFolder &Param = Main.InputVariables.ImplantParameters;
  AnyRefNode HumImplantPos = {
    sRel = .Param.HumPosition.Position;
    ARel = .Param.HumPosition.Rotation;

    AnySurfSTL ProtHumSTL = {
      FileName = "../../../Body/STLModels/ImplantModels/" + ..Param.ImplantNames.HumerusName + ".stl";
      ScaleXYZ = {1,1,1}*0.001;
      #if Camera==0
      AnyDrawSurf drw= {
        FileName = .FileName;
        RGB = {0.2,0.4,0.5};
        ScaleXYZ = {1,1,1}*0.001;
        // Opacity = .5;
      };
      #endif
    };
  };
  // END Humeral implant
  //-----------------------

}; // END HumerusBoneGeometry
  // --------------------------

  // Points anatomiques d'interet
  AnyRefNode DeltoidConnectorCenter = {
    sRel=.art_tub_minus_tub_majus.sRel;
    //sRel=.art_gh_hum.sRel;

  };

  AnyRefNode gh = {

    sRel = .Scale({0.00000, 0.000000 , -0.000000})*.Mirror;
    #include "../DrawSettings/BML.any"
    #include "../DrawSettings/JointAxesProximal.any"
    #if Camera==0
      AnyDrawRefFrame drw={RGB={0,1,0};
  	ScaleXYZ={1,1,1}*0.06;
      };
    #endif
    //AnySurfSphere sphere={Radius=0.03;AnyDrawParamSurf drw={};};


  };

  AnyRefNode em = {sRel = .Scale({-0.030510, -0.311210 , 0.000000}+.OffSet)*.Mirror;
    #include "../DrawSettings/BML.any"
     //AnyDrawRefFrame drw={};
  };

  AnyRefNode el = {sRel = .Scale({0.030510, -0.306605 , 0.000000}+.OffSet)*.Mirror;
    #include "../DrawSettings/BML.any"
    //AnyDrawRefFrame drw={};
  };


  //Axis for flexion extension joint data
  AnyRefNode fe = {
    sRel = .Scale({(0.013072-.01), -0.331048 , -0.007917}+.OffSet)*.Mirror;

    //Note:STC the axis might be subject for scaling
    /*ARel = {
    {...Sign*-0.998167,...Sign*-0.060507,-0.001446},
    {-0.060524,0.997882,...Sign*0.023852},
    {-0.000000,0.023896,...Sign*-0.999714}};*/

    ARel = {
      {...Sign*-1,...Sign*-0,0.0},
      {0,1,...Sign*0.0},
      {-0.000000,0.0,...Sign*-1}};

    #include "../DrawSettings/JointAxesDistal.any"

  };


}; // Humerus

//************************************************************************************


AnySeg Ulna ={

  AnyMat33 Mirror={{1,0,0},{0,..Sign,0},{0,0,1}};

  AnyFunTransform3D &Scale=..Scaling.GeometricalScaling.Ulna.ScaleFunction;

  r0=.Humerus.fe.sRel*.Humerus.Axes0'+.Humerus.r0;

  #include "../DrawSettings/Nodes.any"

  AnyVar MassS = .....Scaling.MassScaling.Ulna.MassScale;

  AnyVar MassStandard =..StandardParameters.Ulna.Mass; // Veeger1997 subject no.4.

  Mass = MassS*MassStandard;

  //AnyVar LengthStandard = 0.275575;


  //Note stc issue for scaling
  AnyVar Length = ((us.sRel[1]-ol.sRel[1])^2)^0.5; // Find the length using bonylandmark x coordinates!
  AnyVar Radius = (Mass/(3.1416*Length*..StandardParameters.Ulna.Density))^0.5;

  AnyVar Ixx = 0.25*Mass*Radius*Radius + 1/12*Mass*Length*Length;
  AnyVar Iyy = 0.5*Mass*Radius*Radius;
  AnyVar Izz = Ixx;
  Jii = {Ixx,Iyy,Izz};
  sCoM={0,0.43*Length,0}*Mirror;
  JaboutCoMOnOff = On;

  //-->Temp
  AnyRefNode ScalingNode = {};
  //<--Temp

  AnyRefNode fe = { sRel=.Scale({0.0,0.008,0.0})*.Mirror;
    #include "../DrawSettings/JointAxesProximal.any"
  };

  //Node used for defining proximal ps joint
  AnyRefNode ps2 = {
    sRel=.Scale({-0.015,0.0,0.005})*.Mirror;
    ARel=RotMat(sRel,.us.sRel,.ol.sRel)*RotMat(pi,y)*RotMat(pi/2,z);

    AnyRefNode usRot = {
      sRel = {0.00000, vnorm(..us.sRel-.sRel), 0.000000} + ..Scale({0, -0.008, 0});
    };

    AnyRefNode ps2Reac = {
      sRel = ..Scale({0.0, 0.025, 0.0});
    };
  };


  AnyDrawSurf DrwSurf = {
    FileName = "Ulna_bone";
    ScaleXYZ = ({1.0,1.0,1.0})*.Mirror;
    RGB =...ColorRef.Segments;
    AnyFunTransform3D &Scale = .Scale;
    Opacity = ...BonesOpacity.Ulna;
  };


  AnyRefNode us = {
    sRel = .Scale({0.024878, 0.270451, 0.000000})*.Mirror;
    #include "../DrawSettings/BML.any"
  };

  AnyRefNode ol = {sRel = .Scale({0.019665, -0.005124, 0.033000})*.Mirror;
    #include "../DrawSettings/BML.any"
  };

  //This is the nodes which are used for the definiton of the pronation supination axis.
  AnyRefNode ps = {
    sRel = .Scale({-0.010063, 0.045066, -0.002620})*.Mirror;
  };

}; // Ulna


AnySeg Radius ={

  AnyMat33 Mirror={{1,0,0},{0,..Sign,0},{0,0,1}};

  AnyFunTransform3D &Scale=..Scaling.GeometricalScaling.Radius.ScaleFunction;

  r0=.Ulna.ps.sRel*.Ulna.Axes0'+.Ulna.r0;

  //This node is used for scaling of radius together with ulna
  //using the scaling matrix of ulna
  //For a neutral position this node will be located in the origo of
  //Ulna
  //Arel is used to map the scaling of ulna into the rotated coordinate system
  //of radius
  AnyRefNode NeutralPositionOnUlna = {
    AnyVec3 Radius_R = {0.110509, 0.020415, 0.280149};
    AnyVec3 Ulna_R = {0.098238, 0.059976, 0.261779};
    AnyMat33 Radius_Axes = {{-0.279448, -0.020684, -0.959938}, {0.956474, -0.093525, -0.276425}, {-0.084061, -0.995402, 0.045919}};
    AnyMat33 Ulna_Axes = {{0.020302, 0.279477, -0.959938}, {-0.232048, -0.932600, -0.276425}, {-0.972492, 0.228363, 0.045919}};
    sRel = {0.042812, 0.014839, 0.000000}*.Mirror;
    ARel = {{-0.145873, -0.989303, -0.000001}, {0.989303, -0.145873, 0.000001}, {-0.000001, -0.000000, 1.000000}};
  };


  #include "../DrawSettings/Nodes.any"

  AnyVar MassS = .....Scaling.MassScaling.Radius.MassScale;

  AnyVar MassStandard =..StandardParameters.Radius.Mass; // Veeger1997 subject no.4.

  Mass = MassS*MassStandard;

  //AnyVar LengthStandard = 0.275575;
  //NOte stc issue for scaling
  AnyVar Length = .Ulna.Length;
  AnyVar Radius = (Mass/(3.1416*Length*..StandardParameters.Radius.Density))^0.5;

  AnyVar Iyy = 0.25*Mass*Radius*Radius + 1/12*Mass*Length*Length;
  AnyVar Ixx = 0.5*Mass*Radius*Radius;
  AnyVar Izz = Iyy;
  Jii = {Ixx,Iyy,Izz};

  sCoM={-0.43*Length,0,0};
  JaboutCoMOnOff = On;

  //-->Temp
  AnyRefNode AnatomicalFrame = {};
  AnyRefNode& ScalingNode = AnatomicalFrame;
  AnyFunTransform3D& GeomScale = Scale;
  //<--Temp

  AnyRefNode PointPS2 = {
    #include "../DrawSettings/JointAxesProximal.any"
    sRel = .Scale({0.045, -0.0, 0.0})*.Mirror;

    AnyRefNode PointPS2Rot = {
      ARel = RotMat(.sRel, ..PS.sRel, ..rs.sRel);
      sRel = {0, 0, 0};
      AnyRefNode PS2Reac = {
        sRel =... Scale({0.025, 0, 0});
      };
    };
  };


  AnyDrawSurf DrwSurf = {
    FileName = "radius_bone";
    ScaleXYZ = ({1.0,1.0,1.0})*.Mirror;
    RGB = ...ColorRef.Segments;
    AnyFunTransform3D &Scale = .Scale;
    Opacity = ...BonesOpacity.Radius;
  };


  // Radius stylno bml
  //Not used!
  AnyRefNode rs = {
    sRel = .Scale({-0.236653, -0.041349, 0.000000})*.Mirror;
    #include "../DrawSettings/BML.any"
  };

  AnyRefNode wj = {
    ARel=RotMat(...Sign*-15*pi/180,z);
    sRel = .Scale({-0.235, -0.015, 0.01})*.Mirror;
    //    AnyDrawRefFrame drw={RGB={0,1,0};};
    #include "../DrawSettings/BML.any"
  };

  // This is the RefNode which is used for the pronation supination axis
  AnyRefNode PS = {
    #include "../DrawSettings/JointAxesProximal.any"
    sRel = .Scale({-0.232338+0.012, 0.005, 0.015})*.Mirror;
    #include "../DrawSettings/BML.any"
  };
}; // Radius


//this seg is introduced because the flexion extension axis in the wrist is not coincident with the radial ulnar deviation axis
AnySeg WristJointSeg ={
  Mass=0;
  Jii={0,0,0};
  r0=.Radius.wj.sRel*.Radius.Axes0'+.Radius.r0;
//  Axes0={
//    {.Hand.Axes0[0][0],.Hand.Axes0[0][1],.Hand.Axes0[0][2]},
//    {.Hand.Axes0[1][0],.Hand.Axes0[1][1],.Hand.Axes0[1][2]},
//    {.Hand.Axes0[2][0],.Hand.Axes0[2][1],.Hand.Axes0[2][2]}}*RotMat(0.5*(1-..Sign)*pi,x);

  AnyRefNode FlexionExtensionAxis={sRel={0.00,0,0};};
  AnyRefNode RadialUlnarDeviation={sRel={-0.005,0,0};};
};
