//This is file is used to apply an artificial muscle to
//a particular dof in a measure

//the file add to muscles to the dof of the joint, the strength of these muscles are dependent on joint
//range of motion

AnyFolder Muscle={

  AnyKinMeasureOrg MeasureOrg={
    AnyKinMeasure &Ref=...DOF;
    MeasureOrganizer ={..dof};
  };

  //this variable is true if the joint is outside ROM

  AnyInt ROMExceeded = iffun(orfun(  gtfun(MeasureOrg.Pos[0],.ROM[0]),  ltfun(MeasureOrg.Pos[0],-.ROM[1])),0,1);

  AnyMuscleGeneric PosMuscle={
    AnyVar ROMStrenghtScale=iffun(.ROMExceeded,1.0,0.1);
    AnyMuscleModelUsr1 MusMdl={
      F0=0;
      S=...Strength[0]*.ROMStrenghtScale;
    };
    AnyKinMeasureOrg &ref=.MeasureOrg;
    Type = NonNegative;
    //ForceDirection = 1;
  };

  AnyMuscleGeneric NegMuscle={

    AnyVar ROMStrenghtScale=iffun(.ROMExceeded,1.0,0.1);
    AnyMuscleModelUsr1 MusMdl={
      F0=0;
      S=...Strength[1]*.ROMStrenghtScale;
    };
    AnyKinMeasureOrg &ref=.MeasureOrg;
    Type = NonPositive;
    //ForceDirection = -1;
  };

};
